New "Load.MT_3921204_M1" bus1="175266166.1.2.3.4" phases=3 conn=Delta model=2 kv=13.800000000 kw = 3.7698225 pf=0.92 status=variable vmaxpu=1.5 vminpu=0.93 daily="MT1_1_DU"
New "Load.MT_3921204_M2" bus1="175266166.1.2.3.4" phases=3 conn=Delta model=3 kv=13.800000000 kw = 3.7698225 pf=0.92 status=variable vmaxpu=1.5 vminpu=0.93 daily="MT1_1_DU"
New "Load.MT_4104233_M1" bus1="157512372.1.2.3.4" phases=3 conn=Delta model=2 kv=13.800000000 kw = 39.543347 pf=0.92 status=variable vmaxpu=1.5 vminpu=0.93 daily="MT2_1_DU"
New "Load.MT_4104233_M2" bus1="157512372.1.2.3.4" phases=3 conn=Delta model=3 kv=13.800000000 kw = 39.543347 pf=0.92 status=variable vmaxpu=1.5 vminpu=0.93 daily="MT2_1_DU"


New "Load.MT_4007164_M1" bus1="142433974.1.2.3.4" phases=3 conn=Delta model=2 kv=13.800000000 kw = 3.6153915 pf=0.92 status=variable vmaxpu=1.5 vminpu=0.93 daily="MT2_1_DU"
New "Load.MT_4007164_M2" bus1="142433974.1.2.3.4" phases=3 conn=Delta model=3 kv=13.800000000 kw = 3.6153915 pf=0.92 status=variable vmaxpu=1.5 vminpu=0.93 daily="MT2_1_DU"

New "Load.MT_9090807_M1" bus1="161512708.1.2.3.4" phases=3 conn=Delta model=2 kv=13.800000000 kw = 37.7033495 pf=0.92 status=variable vmaxpu=1.5 vminpu=0.93 daily="MT3_1_DU"
New "Load.MT_9090807_M2" bus1="161512708.1.2.3.4" phases=3 conn=Delta model=3 kv=13.800000000 kw = 37.7033495 pf=0.92 status=variable vmaxpu=1.5 vminpu=0.93 daily="MT3_1_DU"
New "Load.MT_706944_2_M1" bus1="159292260.1.2.3.4" phases=3 conn=Delta model=2 kv=13.800000000 kw = 5.899926 pf=0.92 status=variable vmaxpu=1.5 vminpu=0.93 daily="MT1_1_DU"
New "Load.MT_706944_2_M2" bus1="159292260.1.2.3.4" phases=3 conn=Delta model=3 kv=13.800000000 kw = 5.899926 pf=0.92 status=variable vmaxpu=1.5 vminpu=0.93 daily="MT1_1_DU"
