New "Load.MT_3858946_M1" bus1="169891318.1.2.3.4" phases=3 conn=Delta model=2 kv=13.800000000 kw = 0.0 pf=0.92 status=variable vmaxpu=1.5 vminpu=0.93 daily="MT1_1_DU"
New "Load.MT_3858946_M2" bus1="169891318.1.2.3.4" phases=3 conn=Delta model=3 kv=13.800000000 kw = 0.0 pf=0.92 status=variable vmaxpu=1.5 vminpu=0.93 daily="MT1_1_DU"

New "Load.MT_548310_M1" bus1="182432470.1.2.3.4" phases=3 conn=Delta model=2 kv=13.800000000 kw = 7.171858 pf=0.92 status=variable vmaxpu=1.5 vminpu=0.93 daily="MT1_1_DU"
New "Load.MT_548310_M2" bus1="182432470.1.2.3.4" phases=3 conn=Delta model=3 kv=13.800000000 kw = 7.171858 pf=0.92 status=variable vmaxpu=1.5 vminpu=0.93 daily="MT1_1_DU"

New "Load.MT_4023320_M1" bus1="150344139.1.2.3.4" phases=3 conn=Delta model=2 kv=13.800000000 kw = 8.422219 pf=0.92 status=variable vmaxpu=1.5 vminpu=0.93 daily="MT2_1_DU"
New "Load.MT_4023320_M2" bus1="150344139.1.2.3.4" phases=3 conn=Delta model=3 kv=13.800000000 kw = 8.422219 pf=0.92 status=variable vmaxpu=1.5 vminpu=0.93 daily="MT2_1_DU"
New "Load.MT_3712730_3_M1" bus1="150344143.1.2.3.4" phases=3 conn=Delta model=2 kv=13.800000000 kw = 27.8728505 pf=0.92 status=variable vmaxpu=1.5 vminpu=0.93 daily="MT2_1_DU"
New "Load.MT_3712730_3_M2" bus1="150344143.1.2.3.4" phases=3 conn=Delta model=3 kv=13.800000000 kw = 27.8728505 pf=0.92 status=variable vmaxpu=1.5 vminpu=0.93 daily="MT2_1_DU"
New "Load.MT_3882753_M1" bus1="161432201.1.2.3.4" phases=3 conn=Delta model=2 kv=13.800000000 kw = 9.552029 pf=0.92 status=variable vmaxpu=1.5 vminpu=0.93 daily="MT2_1_DU"
New "Load.MT_3882753_M2" bus1="161432201.1.2.3.4" phases=3 conn=Delta model=3 kv=13.800000000 kw = 9.552029 pf=0.92 status=variable vmaxpu=1.5 vminpu=0.93 daily="MT2_1_DU"
New "Load.MT_3857196_M1" bus1="175933405.1.2.3.4" phases=3 conn=Delta model=2 kv=13.800000000 kw = 9.9226025 pf=0.92 status=variable vmaxpu=1.5 vminpu=0.93 daily="MT1_1_DU"
New "Load.MT_3857196_M2" bus1="175933405.1.2.3.4" phases=3 conn=Delta model=3 kv=13.800000000 kw = 9.9226025 pf=0.92 status=variable vmaxpu=1.5 vminpu=0.93 daily="MT1_1_DU"
New "Load.MT_8981245_M1" bus1="161431963.1.2.3.4" phases=3 conn=Delta model=2 kv=13.800000000 kw = 2.7584065 pf=0.92 status=variable vmaxpu=1.5 vminpu=0.93 daily="MT1_1_DU"
New "Load.MT_8981245_M2" bus1="161431963.1.2.3.4" phases=3 conn=Delta model=3 kv=13.800000000 kw = 2.7584065 pf=0.92 status=variable vmaxpu=1.5 vminpu=0.93 daily="MT1_1_DU"
New "Load.MT_540204_M1" bus1="121959471.1.2.3.4" phases=3 conn=Delta model=2 kv=13.800000000 kw = 12.6773475 pf=0.92 status=variable vmaxpu=1.5 vminpu=0.93 daily="MT2_1_DU"
New "Load.MT_540204_M2" bus1="121959471.1.2.3.4" phases=3 conn=Delta model=3 kv=13.800000000 kw = 12.6773475 pf=0.92 status=variable vmaxpu=1.5 vminpu=0.93 daily="MT2_1_DU"
New "Load.MT_544572_M1" bus1="121959226.1.2.3.4" phases=3 conn=Delta model=2 kv=13.800000000 kw = 46.1001655 pf=0.92 status=variable vmaxpu=1.5 vminpu=0.93 daily="MT3_1_DU"
New "Load.MT_544572_M2" bus1="121959226.1.2.3.4" phases=3 conn=Delta model=3 kv=13.800000000 kw = 46.1001655 pf=0.92 status=variable vmaxpu=1.5 vminpu=0.93 daily="MT3_1_DU"
