New "Load.MT_4104177_M1" bus1="152871342.1.2.3.4" phases=3 conn=Delta model=2 kv=13.800000000 kw = 17.1378955 pf=0.92 status=variable vmaxpu=1.5 vminpu=0.93 daily="MT2_1_DU"
New "Load.MT_4104177_M2" bus1="152871342.1.2.3.4" phases=3 conn=Delta model=3 kv=13.800000000 kw = 17.1378955 pf=0.92 status=variable vmaxpu=1.5 vminpu=0.93 daily="MT2_1_DU"
New "Load.MT_4052041_M1" bus1="121978980.1.2.3.4" phases=3 conn=Delta model=2 kv=13.800000000 kw = 0.1778635 pf=0.92 status=variable vmaxpu=1.5 vminpu=0.93 daily="MT1_1_DU"
New "Load.MT_4052041_M2" bus1="121978980.1.2.3.4" phases=3 conn=Delta model=3 kv=13.800000000 kw = 0.1778635 pf=0.92 status=variable vmaxpu=1.5 vminpu=0.93 daily="MT1_1_DU"
New "Load.MT_8847929_M1" bus1="162179963.1.2.3.4" phases=3 conn=Delta model=2 kv=13.800000000 kw = 1.3305865 pf=0.92 status=variable vmaxpu=1.5 vminpu=0.93 daily="MT1_1_DU"
New "Load.MT_8847929_M2" bus1="162179963.1.2.3.4" phases=3 conn=Delta model=3 kv=13.800000000 kw = 1.3305865 pf=0.92 status=variable vmaxpu=1.5 vminpu=0.93 daily="MT1_1_DU"

New "Load.MT_4018224_M1" bus1="121979757.1.2.3.4" phases=3 conn=Delta model=2 kv=13.800000000 kw = 6.391496 pf=0.92 status=variable vmaxpu=1.5 vminpu=0.93 daily="MT2_1_DU"
New "Load.MT_4018224_M2" bus1="121979757.1.2.3.4" phases=3 conn=Delta model=3 kv=13.800000000 kw = 6.391496 pf=0.92 status=variable vmaxpu=1.5 vminpu=0.93 daily="MT2_1_DU"

New "Load.MT_4286842_M1" bus1="121979806.1.2.3.4" phases=3 conn=Delta model=2 kv=13.800000000 kw = 0.943988 pf=0.92 status=variable vmaxpu=1.5 vminpu=0.93 daily="MT1_1_DU"
New "Load.MT_4286842_M2" bus1="121979806.1.2.3.4" phases=3 conn=Delta model=3 kv=13.800000000 kw = 0.943988 pf=0.92 status=variable vmaxpu=1.5 vminpu=0.93 daily="MT1_1_DU"
New "Load.MT_9181412_M1" bus1="166077780.1.2.3.4" phases=3 conn=Delta model=2 kv=13.800000000 kw = 2.191401 pf=0.92 status=variable vmaxpu=1.5 vminpu=0.93 daily="MT1_1_DU"
New "Load.MT_9181412_M2" bus1="166077780.1.2.3.4" phases=3 conn=Delta model=3 kv=13.800000000 kw = 2.191401 pf=0.92 status=variable vmaxpu=1.5 vminpu=0.93 daily="MT1_1_DU"
