New "Transformer.REG_14A" phases=1 windings=2 buses=["121973919.1.4" "172027369.1.4"] conns=[Wye Wye ] kvs=[7.967 7.967] kvas=[750 750] xhl=0.7 %loadloss=0.0015586666666666668 %noloadloss=0.0005586666666666666
New "Regcontrol.REG_14A" transformer="REG_14A" winding=2 vreg=104.17 band=2 ptratio=79.67433714816836
New "Reactor.TRF_14A_P" phases=1 bus1="121973919.4" R=15 X=0 basefreq=60
New "Reactor.TRF_14A_S" phases=1 bus1="172027369.4" R=15 X=0 basefreq=60
New "Transformer.REG_14B" phases=1 windings=2 buses=["121973919.3.4" "172027369.3.4"] conns=[Wye Wye ] kvs=[7.967 7.967] kvas=[750 750] xhl=0.7 %loadloss=0.0015586666666666668 %noloadloss=0.0005586666666666666
New "Regcontrol.REG_14B" transformer="REG_14B" winding=2 vreg=104.17 band=2 ptratio=79.67433714816836
New "Reactor.TRF_14B_P" phases=1 bus1="121973919.4" R=15 X=0 basefreq=60
New "Reactor.TRF_14B_S" phases=1 bus1="172027369.4" R=15 X=0 basefreq=60
New "Transformer.REG_14C" phases=1 windings=2 buses=["121973919.2.4" "172027369.2.4"] conns=[Wye Wye ] kvs=[7.967 7.967] kvas=[750 750] xhl=0.7 %loadloss=0.0015586666666666668 %noloadloss=0.0005586666666666666
New "Regcontrol.REG_14C" transformer="REG_14C" winding=2 vreg=104.17 band=2 ptratio=79.67433714816836
New "Reactor.TRF_14C_P" phases=1 bus1="121973919.4" R=15 X=0 basefreq=60
New "Reactor.TRF_14C_S" phases=1 bus1="172027369.4" R=15 X=0 basefreq=60
New "Transformer.REG_1085A" phases=1 windings=2 buses=["121971021.1.4" "176760895.1.4"] conns=[Wye Wye ] kvs=[7.967 7.967] kvas=[1500 1500] xhl=0.7 %loadloss=0.0007793333333333334 %noloadloss=0.0002793333333333333
New "Regcontrol.REG_1085A" transformer="REG_1085A" winding=2 vreg=104.17 band=2 ptratio=79.67433714816836
New "Reactor.TRF_1085A_P" phases=1 bus1="121971021.4" R=15 X=0 basefreq=60
New "Reactor.TRF_1085A_S" phases=1 bus1="176760895.4" R=15 X=0 basefreq=60
New "Transformer.REG_1085B" phases=1 windings=2 buses=["121971021.3.4" "176760895.3.4"] conns=[Wye Wye ] kvs=[7.967 7.967] kvas=[1500 1500] xhl=0.7 %loadloss=0.0007793333333333334 %noloadloss=0.0002793333333333333
New "Regcontrol.REG_1085B" transformer="REG_1085B" winding=2 vreg=104.17 band=2 ptratio=79.67433714816836
New "Reactor.TRF_1085B_P" phases=1 bus1="121971021.4" R=15 X=0 basefreq=60
New "Reactor.TRF_1085B_S" phases=1 bus1="176760895.4" R=15 X=0 basefreq=60
New "Transformer.REG_1085C" phases=1 windings=2 buses=["121971021.2.4" "176760895.2.4"] conns=[Wye Wye ] kvs=[7.967 7.967] kvas=[1500 1500] xhl=0.7 %loadloss=0.0007793333333333334 %noloadloss=0.0002793333333333333
New "Regcontrol.REG_1085C" transformer="REG_1085C" winding=2 vreg=104.17 band=2 ptratio=79.67433714816836
New "Reactor.TRF_1085C_P" phases=1 bus1="121971021.4" R=15 X=0 basefreq=60
New "Reactor.TRF_1085C_S" phases=1 bus1="176760895.4" R=15 X=0 basefreq=60
New "Transformer.REG_6789A" phases=1 windings=2 buses=["166213203.1.4" "177830423.1.4"] conns=[Wye Wye ] kvs=[7.967 7.967] kvas=[1500 1500] xhl=0.7 %loadloss=0.0007793333333333334 %noloadloss=0.0002793333333333333
New "Regcontrol.REG_6789A" transformer="REG_6789A" winding=2 vreg=104.17 band=2 ptratio=79.67433714816836
New "Reactor.TRF_6789A_P" phases=1 bus1="166213203.4" R=15 X=0 basefreq=60
New "Reactor.TRF_6789A_S" phases=1 bus1="177830423.4" R=15 X=0 basefreq=60
New "Transformer.REG_6789B" phases=1 windings=2 buses=["166213203.3.4" "177830423.3.4"] conns=[Wye Wye ] kvs=[7.967 7.967] kvas=[1500 1500] xhl=0.7 %loadloss=0.0007793333333333334 %noloadloss=0.0002793333333333333
New "Regcontrol.REG_6789B" transformer="REG_6789B" winding=2 vreg=104.17 band=2 ptratio=79.67433714816836
New "Reactor.TRF_6789B_P" phases=1 bus1="166213203.4" R=15 X=0 basefreq=60
New "Reactor.TRF_6789B_S" phases=1 bus1="177830423.4" R=15 X=0 basefreq=60
New "Transformer.REG_6789C" phases=1 windings=2 buses=["166213203.2.4" "177830423.2.4"] conns=[Wye Wye ] kvs=[7.967 7.967] kvas=[1500 1500] xhl=0.7 %loadloss=0.0007793333333333334 %noloadloss=0.0002793333333333333
New "Regcontrol.REG_6789C" transformer="REG_6789C" winding=2 vreg=104.17 band=2 ptratio=79.67433714816836
New "Reactor.TRF_6789C_P" phases=1 bus1="166213203.4" R=15 X=0 basefreq=60
New "Reactor.TRF_6789C_S" phases=1 bus1="177830423.4" R=15 X=0 basefreq=60
