New "Load.LDV_S10001_BT_4440240_1_M1_IJAU05_1004440240_004926" bus1="1004440240.1.2.3.4" phases=3 conn=Delta model=1 kv=0.220000000 kw=3.5 pf=1 status=variable vmaxpu=1.5 vminpu=0.92 enabled=yes ! tipo=LDV kw_ativo=3.5 classe_ucbt=RE ctmt=IJAU05 ramal=4440240 pac=1004440240
New "Load.LDV_S10001_BT_6280936_2_M1_IJAU05_1006280936_005507" bus1="1006280936.1.2.3.4" phases=3 conn=Delta model=1 kv=0.220000000 kw=3.5 pf=1 status=variable vmaxpu=1.5 vminpu=0.92 enabled=yes ! tipo=LDV kw_ativo=3.5 classe_ucbt=RE ctmt=IJAU05 ramal=6280936 pac=1006280936
New "Load.LDV_S10001_BT_4527768_1_M1_IJAU05_1004527768_004988" bus1="1004527768.3.1.4" phases=1 conn=Delta model=1 kv=0.220000000 kw=3.5 pf=1 status=variable vmaxpu=1.5 vminpu=0.92 enabled=yes ! tipo=LDV kw_ativo=3.5 classe_ucbt=RE ctmt=IJAU05 ramal=4527768 pac=1004527768
New "Load.LDV_S10001_BT_1033088_2_M2_IJAU05_1001033088_001581" bus1="1001033088.1.2.3.4" phases=3 conn=Delta model=1 kv=0.220000000 kw=3.5 pf=1 status=variable vmaxpu=1.5 vminpu=0.92 enabled=yes ! tipo=LDV kw_ativo=3.5 classe_ucbt=RE ctmt=IJAU05 ramal=1033088 pac=1001033088
New "Load.LDV_S10001_BT_1071028_2_M1_IJAU05_1001071028_002917" bus1="1001071028.2.4" phases=1 conn=Wye model=1 kv=0.220000000 kw=3.5 pf=1 status=variable vmaxpu=1.5 vminpu=0.92 enabled=yes ! tipo=LDV kw_ativo=3.5 classe_ucbt=RE ctmt=IJAU05 ramal=1071028 pac=1001071028
New "Load.TW_S10001_BT_1032773_1_M2_IJAU05_1001032773_001500" bus1="1001032773.3.4" phases=1 conn=Wye model=1 kv=0.220000000 kw=2.0 pf=1 status=variable vmaxpu=1.5 vminpu=0.92 enabled=yes ! tipo=TW kw_ativo=2.0 classe_ucbt=RE ctmt=IJAU05 ramal=1032773 pac=1001032773
New "Load.TW_S10001_BT_4527768_1_M2_IJAU05_1004527768_004989" bus1="1004527768.3.1.4" phases=1 conn=Delta model=1 kv=0.220000000 kw=2.0 pf=1 status=variable vmaxpu=1.5 vminpu=0.92 enabled=yes ! tipo=TW kw_ativo=2.0 classe_ucbt=RE ctmt=IJAU05 ramal=4527768 pac=1004527768
New "Load.TW_S10001_BT_1075242_1_M1_IJAU05_1001075242_003369" bus1="1001075242.2.4" phases=1 conn=Wye model=1 kv=0.220000000 kw=2.0 pf=1 status=variable vmaxpu=1.5 vminpu=0.92 enabled=yes ! tipo=TW kw_ativo=2.0 classe_ucbt=RE ctmt=IJAU05 ramal=1075242 pac=1001075242
New "Load.TW_S10001_BT_1042804_2_M1_IJAU05_1001042804_002482" bus1="1001042804.1.2.3.4" phases=3 conn=Delta model=1 kv=0.220000000 kw=2.0 pf=1 status=variable vmaxpu=1.5 vminpu=0.92 enabled=yes ! tipo=TW kw_ativo=2.0 classe_ucbt=RE ctmt=IJAU05 ramal=1042804 pac=1001042804
