New "Load.LDV_S10001_BT_3867850_M1_IJAU06_1003867850_002003" bus1="1003867850.1.2.3.4" phases=3 conn=Delta model=1 kv=0.220000000 kw=3.5 pf=1 status=variable vmaxpu=1.5 vminpu=0.92 enabled=yes ! tipo=LDV kw_ativo=3.5 classe_ucbt=RE ctmt=IJAU06 ramal=3867850 pac=1003867850
New "Load.TW_S10001_BT_987301_1_M1_IJAU06_1000987301_003016" bus1="1000987301.3.4" phases=1 conn=Wye model=1 kv=0.220000000 kw=2.0 pf=1 status=variable vmaxpu=1.5 vminpu=0.92 enabled=yes ! tipo=TW kw_ativo=2.0 classe_ucbt=RE ctmt=IJAU06 ramal=987301 pac=1000987301
New "Load.TRUCK_S10001_BT_1200339_M1_IJAU06_1001200339_000035" bus1="1001200339.1.2.3.4" phases=3 conn=Delta model=1 kv=0.220000000 kw=50.0 pf=1 status=variable vmaxpu=1.5 vminpu=0.92 enabled=yes ! tipo=TRUCK kw_ativo=50.0 classe_ucbt=IN ctmt=IJAU06 ramal=1200339 pac=1001200339
New "Load.TRUCK_S10001_BT_986867_M1_IJAU06_1000986867_000081" bus1="1000986867.1.2.3.4" phases=3 conn=Delta model=1 kv=0.220000000 kw=50.0 pf=1 status=variable vmaxpu=1.5 vminpu=0.92 enabled=yes ! tipo=TRUCK kw_ativo=50.0 classe_ucbt=IN ctmt=IJAU06 ramal=986867 pac=1000986867
