New "Load.LDV_S10001_BT_1041838_M1_IJAU07_1001041838_000508" bus1="1001041838.1.2.4" phases=1 conn=Delta model=1 kv=0.220000000 kw=3.5 pf=1 status=variable vmaxpu=1.5 vminpu=0.92 enabled=yes ! tipo=LDV kw_ativo=3.5 classe_ucbt=RE ctmt=IJAU07 ramal=1041838 pac=1001041838
New "Load.LDV_S10001_BT_1053304_4_M1_IJAU07_1001053304_001603" bus1="1001053304.1.2.3.4" phases=3 conn=Delta model=1 kv=0.220000000 kw=3.5 pf=1 status=variable vmaxpu=1.5 vminpu=0.92 enabled=yes ! tipo=LDV kw_ativo=3.5 classe_ucbt=RE ctmt=IJAU07 ramal=1053304 pac=1001053304
New "Load.LDV_S10001_BT_1081598_M2_IJAU07_1001081598_004464" bus1="1001081598.1.2.3.4" phases=3 conn=Delta model=1 kv=0.220000000 kw=3.5 pf=1 status=variable vmaxpu=1.5 vminpu=0.92 enabled=yes ! tipo=LDV kw_ativo=3.5 classe_ucbt=RE ctmt=IJAU07 ramal=1081598 pac=1001081598
New "Load.TW_S10001_BT_1041635_M1_IJAU07_1001041635_000457" bus1="1001041635.1.4" phases=1 conn=Wye model=1 kv=0.220000000 kw=2.0 pf=1 status=variable vmaxpu=1.5 vminpu=0.92 enabled=yes ! tipo=TW kw_ativo=2.0 classe_ucbt=RE ctmt=IJAU07 ramal=1041635 pac=1001041635
New "Load.TW_S10001_BT_3683008_1_M2_IJAU07_1003683008_006133" bus1="1003683008.2.3.4" phases=1 conn=Delta model=1 kv=0.220000000 kw=2.0 pf=1 status=variable vmaxpu=1.5 vminpu=0.92 enabled=yes ! tipo=TW kw_ativo=2.0 classe_ucbt=RE ctmt=IJAU07 ramal=3683008 pac=1003683008
New "Load.TRUCK_S10001_BT_1058428_1_M1_IJAU07_1001058428_000011" bus1="1001058428.1.2.3.4" phases=3 conn=Delta model=1 kv=0.220000000 kw=50.0 pf=1 status=variable vmaxpu=1.5 vminpu=0.92 enabled=yes ! tipo=TRUCK kw_ativo=50.0 classe_ucbt=IN ctmt=IJAU07 ramal=1058428 pac=1001058428
