New "Load.LDV_S10001_BT_1018052_M1_IJAU11_1001018052_001669" bus1="1001018052.1.4" phases=1 conn=Wye model=1 kv=0.220000000 kw=3.5 pf=1 status=variable vmaxpu=1.5 vminpu=0.92 enabled=yes ! tipo=LDV kw_ativo=3.5 classe_ucbt=RE ctmt=IJAU11 ramal=1018052 pac=1001018052
New "Load.LDV_S10001_BT_1039395_7_M1_IJAU11_1001039395_003040" bus1="1001039395.1.2.3.4" phases=3 conn=Delta model=1 kv=0.220000000 kw=3.5 pf=1 status=variable vmaxpu=1.5 vminpu=0.92 enabled=yes ! tipo=LDV kw_ativo=3.5 classe_ucbt=RE ctmt=IJAU11 ramal=1039395 pac=1001039395
New "Load.LDV_S10001_BT_1016855_M1_IJAU11_1001016855_001482" bus1="1001016855.1.4" phases=1 conn=Wye model=1 kv=0.220000000 kw=3.5 pf=1 status=variable vmaxpu=1.5 vminpu=0.92 enabled=yes ! tipo=LDV kw_ativo=3.5 classe_ucbt=RE ctmt=IJAU11 ramal=1016855 pac=1001016855
New "Load.LDV_S10001_BT_1018437_2_M1_IJAU11_1001018437_001753" bus1="1001018437.1.2.3.4" phases=3 conn=Delta model=1 kv=0.220000000 kw=3.5 pf=1 status=variable vmaxpu=1.5 vminpu=0.92 enabled=yes ! tipo=LDV kw_ativo=3.5 classe_ucbt=RE ctmt=IJAU11 ramal=1018437 pac=1001018437
New "Load.TW_S10001_BT_994616_M1_IJAU11_1000994616_005359" bus1="1000994616.1.2.3.4" phases=3 conn=Delta model=1 kv=0.220000000 kw=2.0 pf=1 status=variable vmaxpu=1.5 vminpu=0.92 enabled=yes ! tipo=TW kw_ativo=2.0 classe_ucbt=RE ctmt=IJAU11 ramal=994616 pac=1000994616
New "Load.TW_S10001_BT_1024576_2_M1_IJAU11_1001024576_002446" bus1="1001024576.1.2.4" phases=1 conn=Delta model=1 kv=0.240000000 kw=2.0 pf=1 status=variable vmaxpu=1.5 vminpu=0.92 enabled=yes ! tipo=TW kw_ativo=2.0 classe_ucbt=RE ctmt=IJAU11 ramal=1024576 pac=1001024576
