New "Load.LDV_S10001_BT_1001035_M1_IJAU13_1001001035_000171" bus1="1001001035.3.4" phases=1 conn=Wye model=1 kv=0.220000000 kw=3.5 pf=1 status=variable vmaxpu=1.5 vminpu=0.92 enabled=yes ! tipo=LDV kw_ativo=3.5 classe_ucbt=RE ctmt=IJAU13 ramal=1001035 pac=1001001035
New "Load.LDV_S10001_BT_976171_M1_IJAU13_1000976171_005910" bus1="1000976171.1.4" phases=1 conn=Wye model=1 kv=0.120000000 kw=3.5 pf=1 status=variable vmaxpu=1.5 vminpu=0.92 enabled=yes ! tipo=LDV kw_ativo=3.5 classe_ucbt=RE ctmt=IJAU13 ramal=976171 pac=1000976171
New "Load.LDV_S10001_BT_972454_1_M1_IJAU13_1000972454_005367" bus1="1000972454.2.3.4" phases=1 conn=Delta model=1 kv=0.220000000 kw=3.5 pf=1 status=variable vmaxpu=1.5 vminpu=0.92 enabled=yes ! tipo=LDV kw_ativo=3.5 classe_ucbt=RE ctmt=IJAU13 ramal=972454 pac=1000972454
New "Load.LDV_S10001_BT_1010639_M1_IJAU13_1001010639_001963" bus1="1001010639.3.4" phases=1 conn=Wye model=1 kv=0.220000000 kw=3.5 pf=1 status=variable vmaxpu=1.5 vminpu=0.92 enabled=yes ! tipo=LDV kw_ativo=3.5 classe_ucbt=RE ctmt=IJAU13 ramal=1010639 pac=1001010639
New "Load.LDV_S10001_BT_992453_19_M2_IJAU13_1000992453_007285" bus1="1000992453.1.2.3.4" phases=3 conn=Delta model=1 kv=0.220000000 kw=3.5 pf=1 status=variable vmaxpu=1.5 vminpu=0.92 enabled=yes ! tipo=LDV kw_ativo=3.5 classe_ucbt=RE ctmt=IJAU13 ramal=992453 pac=1000992453
New "Load.LDV_S10001_BT_1005949_M1_IJAU13_1001005949_000940" bus1="1001005949.2.3.4" phases=1 conn=Delta model=1 kv=0.220000000 kw=3.5 pf=1 status=variable vmaxpu=1.5 vminpu=0.92 enabled=yes ! tipo=LDV kw_ativo=3.5 classe_ucbt=RE ctmt=IJAU13 ramal=1005949 pac=1001005949
New "Load.LDV_S10001_BT_4857566_M1_IJAU13_1004857566_004492" bus1="1004857566.2.4" phases=1 conn=Wye model=1 kv=0.120000000 kw=3.5 pf=1 status=variable vmaxpu=1.5 vminpu=0.92 enabled=yes ! tipo=LDV kw_ativo=3.5 classe_ucbt=RE ctmt=IJAU13 ramal=4857566 pac=1004857566
New "Load.TW_S10001_BT_4227937_1_M1_IJAU13_1004227937_004115" bus1="1004227937.1.2.3.4" phases=3 conn=Delta model=1 kv=0.220000000 kw=2.0 pf=1 status=variable vmaxpu=1.5 vminpu=0.92 enabled=yes ! tipo=TW kw_ativo=2.0 classe_ucbt=RE ctmt=IJAU13 ramal=4227937 pac=1004227937
New "Load.TW_S10001_BT_1005172_M1_IJAU13_1001005172_000879" bus1="1001005172.3.1.4" phases=1 conn=Delta model=1 kv=0.220000000 kw=2.0 pf=1 status=variable vmaxpu=1.5 vminpu=0.92 enabled=yes ! tipo=TW kw_ativo=2.0 classe_ucbt=RE ctmt=IJAU13 ramal=1005172 pac=1001005172
New "Load.TW_S10001_BT_998970_3_M1_IJAU13_1000998970_007672" bus1="1000998970.1.4" phases=1 conn=Wye model=1 kv=0.220000000 kw=2.0 pf=1 status=variable vmaxpu=1.5 vminpu=0.92 enabled=yes ! tipo=TW kw_ativo=2.0 classe_ucbt=RE ctmt=IJAU13 ramal=998970 pac=1000998970
New "Load.TW_S10001_BT_1000433_3_M1_IJAU13_1001000433_000032" bus1="1001000433.1.2.4" phases=1 conn=Delta model=1 kv=0.220000000 kw=2.0 pf=1 status=variable vmaxpu=1.5 vminpu=0.92 enabled=yes ! tipo=TW kw_ativo=2.0 classe_ucbt=RE ctmt=IJAU13 ramal=1000433 pac=1001000433
New "Load.TRUCK_S10001_BT_4982831_M1_IJAU13_1004982831_000009" bus1="1004982831.1.2.3.4" phases=3 conn=Delta model=1 kv=0.220000000 kw=50.0 pf=1 status=variable vmaxpu=1.5 vminpu=0.92 enabled=yes ! tipo=TRUCK kw_ativo=50.0 classe_ucbt=IN ctmt=IJAU13 ramal=4982831 pac=1004982831
