New "Load.LDV_BT_984851_2_M1_IJAU14_1000984851_002769" bus1="1000984851.2.3.4" phases=1 conn=Delta model=1 kv=0.220000000 kw=3.5 pf=1 status=variable vmaxpu=1.5 vminpu=0.92
New "Load.LDV_BT_991361_2_M2_IJAU14_1000991361_003077" bus1="1000991361.2.3.4" phases=1 conn=Delta model=1 kv=0.220000000 kw=3.5 pf=1 status=variable vmaxpu=1.5 vminpu=0.92
New "Load.TW_BT_6477244_1_M1_IJAU14_1006477244_001645" bus1="1006477244.1.2.3.4" phases=3 conn=Delta model=1 kv=0.220000000 kw=2.0 pf=1 status=variable vmaxpu=1.5 vminpu=0.92
New "Load.TW_BT_5154674_M2_IJAU14_1005154674_001266" bus1="1005154674.1.2.4" phases=1 conn=Delta model=1 kv=0.220000000 kw=2.0 pf=1 status=variable vmaxpu=1.5 vminpu=0.92
