New "Load.LDV_S10001_BT_996891_M1_IJAU15_1000996891_008716" bus1="1000996891.2.4" phases=1 conn=Wye model=1 kv=0.220000000 kw=3.5 pf=1 status=variable vmaxpu=1.5 vminpu=0.92 enabled=yes ! tipo=LDV kw_ativo=3.5 classe_ucbt=RE ctmt=IJAU15 ramal=996891 pac=1000996891
New "Load.LDV_S10001_BT_970683_2_M1_IJAU15_1000970683_007056" bus1="1000970683.3.1.4" phases=1 conn=Delta model=1 kv=0.220000000 kw=3.5 pf=1 status=variable vmaxpu=1.5 vminpu=0.92 enabled=yes ! tipo=LDV kw_ativo=3.5 classe_ucbt=RE ctmt=IJAU15 ramal=970683 pac=1000970683
New "Load.LDV_S10001_BT_1133699_M1_IJAU15_1001133699_002769" bus1="1001133699.3.4" phases=1 conn=Wye model=1 kv=0.220000000 kw=3.5 pf=1 status=variable vmaxpu=1.5 vminpu=0.92 enabled=yes ! tipo=LDV kw_ativo=3.5 classe_ucbt=RE ctmt=IJAU15 ramal=1133699 pac=1001133699
New "Load.LDV_S10001_BT_998172_M1_IJAU15_1000998172_008874" bus1="1000998172.1.4" phases=1 conn=Wye model=1 kv=0.220000000 kw=3.5 pf=1 status=variable vmaxpu=1.5 vminpu=0.92 enabled=yes ! tipo=LDV kw_ativo=3.5 classe_ucbt=RE ctmt=IJAU15 ramal=998172 pac=1000998172
New "Load.LDV_S10001_BT_1185758_M1_IJAU15_1001185758_003453" bus1="1001185758.2.4" phases=1 conn=Wye model=1 kv=0.220000000 kw=3.5 pf=1 status=variable vmaxpu=1.5 vminpu=0.92 enabled=yes ! tipo=LDV kw_ativo=3.5 classe_ucbt=RE ctmt=IJAU15 ramal=1185758 pac=1001185758
New "Load.TW_S10001_BT_3673950_M1_IJAU15_1003673950_004776" bus1="1003673950.1.2.4" phases=1 conn=Delta model=1 kv=0.220000000 kw=2.0 pf=1 status=variable vmaxpu=1.5 vminpu=0.92 enabled=yes ! tipo=TW kw_ativo=2.0 classe_ucbt=RE ctmt=IJAU15 ramal=3673950 pac=1003673950
