! ========================================
! ALIMENTADOR IJAU05
! ========================================
New "Load.LDV_S10001_BT_4440240_1_M1_IJAU05_1004440240_004926" bus1="1004440240.1.2.3.4" phases=3 conn=Delta model=1 kv=0.220000000 kw=3.5 pf=1 status=variable vmaxpu=1.5 vminpu=0.92 enabled=yes ! tipo=LDV kw_ativo=3.5 classe_ucbt=RE ctmt=IJAU05 ramal=4440240 pac=1004440240
New "Load.LDV_S10001_BT_6280936_2_M1_IJAU05_1006280936_005507" bus1="1006280936.1.2.3.4" phases=3 conn=Delta model=1 kv=0.220000000 kw=3.5 pf=1 status=variable vmaxpu=1.5 vminpu=0.92 enabled=yes ! tipo=LDV kw_ativo=3.5 classe_ucbt=RE ctmt=IJAU05 ramal=6280936 pac=1006280936
New "Load.LDV_S10001_BT_4527768_1_M1_IJAU05_1004527768_004988" bus1="1004527768.3.1.4" phases=1 conn=Delta model=1 kv=0.220000000 kw=3.5 pf=1 status=variable vmaxpu=1.5 vminpu=0.92 enabled=yes ! tipo=LDV kw_ativo=3.5 classe_ucbt=RE ctmt=IJAU05 ramal=4527768 pac=1004527768
New "Load.LDV_S10001_BT_1033088_2_M2_IJAU05_1001033088_001581" bus1="1001033088.1.2.3.4" phases=3 conn=Delta model=1 kv=0.220000000 kw=3.5 pf=1 status=variable vmaxpu=1.5 vminpu=0.92 enabled=yes ! tipo=LDV kw_ativo=3.5 classe_ucbt=RE ctmt=IJAU05 ramal=1033088 pac=1001033088
New "Load.LDV_S10001_BT_1071028_2_M1_IJAU05_1001071028_002917" bus1="1001071028.2.4" phases=1 conn=Wye model=1 kv=0.220000000 kw=3.5 pf=1 status=variable vmaxpu=1.5 vminpu=0.92 enabled=yes ! tipo=LDV kw_ativo=3.5 classe_ucbt=RE ctmt=IJAU05 ramal=1071028 pac=1001071028
New "Load.TW_S10001_BT_1032773_1_M2_IJAU05_1001032773_001500" bus1="1001032773.3.4" phases=1 conn=Wye model=1 kv=0.220000000 kw=2.0 pf=1 status=variable vmaxpu=1.5 vminpu=0.92 enabled=yes ! tipo=TW kw_ativo=2.0 classe_ucbt=RE ctmt=IJAU05 ramal=1032773 pac=1001032773
New "Load.TW_S10001_BT_4527768_1_M2_IJAU05_1004527768_004989" bus1="1004527768.3.1.4" phases=1 conn=Delta model=1 kv=0.220000000 kw=2.0 pf=1 status=variable vmaxpu=1.5 vminpu=0.92 enabled=yes ! tipo=TW kw_ativo=2.0 classe_ucbt=RE ctmt=IJAU05 ramal=4527768 pac=1004527768
New "Load.TW_S10001_BT_1075242_1_M1_IJAU05_1001075242_003369" bus1="1001075242.2.4" phases=1 conn=Wye model=1 kv=0.220000000 kw=2.0 pf=1 status=variable vmaxpu=1.5 vminpu=0.92 enabled=yes ! tipo=TW kw_ativo=2.0 classe_ucbt=RE ctmt=IJAU05 ramal=1075242 pac=1001075242
New "Load.TW_S10001_BT_1042804_2_M1_IJAU05_1001042804_002482" bus1="1001042804.1.2.3.4" phases=3 conn=Delta model=1 kv=0.220000000 kw=2.0 pf=1 status=variable vmaxpu=1.5 vminpu=0.92 enabled=yes ! tipo=TW kw_ativo=2.0 classe_ucbt=RE ctmt=IJAU05 ramal=1042804 pac=1001042804

! ========================================
! ALIMENTADOR IJAU06
! ========================================
New "Load.LDV_S10001_BT_3867850_M1_IJAU06_1003867850_002003" bus1="1003867850.1.2.3.4" phases=3 conn=Delta model=1 kv=0.220000000 kw=3.5 pf=1 status=variable vmaxpu=1.5 vminpu=0.92 enabled=yes ! tipo=LDV kw_ativo=3.5 classe_ucbt=RE ctmt=IJAU06 ramal=3867850 pac=1003867850
New "Load.TW_S10001_BT_987301_1_M1_IJAU06_1000987301_003016" bus1="1000987301.3.4" phases=1 conn=Wye model=1 kv=0.220000000 kw=2.0 pf=1 status=variable vmaxpu=1.5 vminpu=0.92 enabled=yes ! tipo=TW kw_ativo=2.0 classe_ucbt=RE ctmt=IJAU06 ramal=987301 pac=1000987301
New "Load.TRUCK_S10001_BT_1200339_M1_IJAU06_1001200339_000035" bus1="1001200339.1.2.3.4" phases=3 conn=Delta model=1 kv=0.220000000 kw=50.0 pf=1 status=variable vmaxpu=1.5 vminpu=0.92 enabled=yes ! tipo=TRUCK kw_ativo=50.0 classe_ucbt=IN ctmt=IJAU06 ramal=1200339 pac=1001200339
New "Load.TRUCK_S10001_BT_986867_M1_IJAU06_1000986867_000081" bus1="1000986867.1.2.3.4" phases=3 conn=Delta model=1 kv=0.220000000 kw=50.0 pf=1 status=variable vmaxpu=1.5 vminpu=0.92 enabled=yes ! tipo=TRUCK kw_ativo=50.0 classe_ucbt=IN ctmt=IJAU06 ramal=986867 pac=1000986867

! ========================================
! ALIMENTADOR IJAU07
! ========================================
New "Load.LDV_S10001_BT_1041838_M1_IJAU07_1001041838_000508" bus1="1001041838.1.2.4" phases=1 conn=Delta model=1 kv=0.220000000 kw=3.5 pf=1 status=variable vmaxpu=1.5 vminpu=0.92 enabled=yes ! tipo=LDV kw_ativo=3.5 classe_ucbt=RE ctmt=IJAU07 ramal=1041838 pac=1001041838
New "Load.LDV_S10001_BT_1053304_4_M1_IJAU07_1001053304_001603" bus1="1001053304.1.2.3.4" phases=3 conn=Delta model=1 kv=0.220000000 kw=3.5 pf=1 status=variable vmaxpu=1.5 vminpu=0.92 enabled=yes ! tipo=LDV kw_ativo=3.5 classe_ucbt=RE ctmt=IJAU07 ramal=1053304 pac=1001053304
New "Load.LDV_S10001_BT_1081598_M2_IJAU07_1001081598_004464" bus1="1001081598.1.2.3.4" phases=3 conn=Delta model=1 kv=0.220000000 kw=3.5 pf=1 status=variable vmaxpu=1.5 vminpu=0.92 enabled=yes ! tipo=LDV kw_ativo=3.5 classe_ucbt=RE ctmt=IJAU07 ramal=1081598 pac=1001081598
New "Load.TW_S10001_BT_1041635_M1_IJAU07_1001041635_000457" bus1="1001041635.1.4" phases=1 conn=Wye model=1 kv=0.220000000 kw=2.0 pf=1 status=variable vmaxpu=1.5 vminpu=0.92 enabled=yes ! tipo=TW kw_ativo=2.0 classe_ucbt=RE ctmt=IJAU07 ramal=1041635 pac=1001041635
New "Load.TW_S10001_BT_3683008_1_M2_IJAU07_1003683008_006133" bus1="1003683008.2.3.4" phases=1 conn=Delta model=1 kv=0.220000000 kw=2.0 pf=1 status=variable vmaxpu=1.5 vminpu=0.92 enabled=yes ! tipo=TW kw_ativo=2.0 classe_ucbt=RE ctmt=IJAU07 ramal=3683008 pac=1003683008
New "Load.TRUCK_S10001_BT_1058428_1_M1_IJAU07_1001058428_000011" bus1="1001058428.1.2.3.4" phases=3 conn=Delta model=1 kv=0.220000000 kw=50.0 pf=1 status=variable vmaxpu=1.5 vminpu=0.92 enabled=yes ! tipo=TRUCK kw_ativo=50.0 classe_ucbt=IN ctmt=IJAU07 ramal=1058428 pac=1001058428

! ========================================
! ALIMENTADOR IJAU10
! ========================================
New "Load.LDV_S10001_BT_1247204_5_M2_IJAU10_1001247204_004276" bus1="1001247204.1.2.3.4" phases=3 conn=Delta model=1 kv=0.220000000 kw=3.5 pf=1 status=variable vmaxpu=1.5 vminpu=0.92 enabled=yes ! tipo=LDV kw_ativo=3.5 classe_ucbt=RE ctmt=IJAU10 ramal=1247204 pac=1001247204
New "Load.LDV_S10001_BT_5086683_M1_IJAU10_1005086683_005019" bus1="1005086683.1.2.3.4" phases=3 conn=Delta model=1 kv=0.220000000 kw=3.5 pf=1 status=variable vmaxpu=1.5 vminpu=0.92 enabled=yes ! tipo=LDV kw_ativo=3.5 classe_ucbt=RE ctmt=IJAU10 ramal=5086683 pac=1005086683
New "Load.LDV_S10001_BT_1045485_9_M1_IJAU10_1001045485_001650" bus1="1001045485.1.2.3.4" phases=3 conn=Delta model=1 kv=0.220000000 kw=3.5 pf=1 status=variable vmaxpu=1.5 vminpu=0.92 enabled=yes ! tipo=LDV kw_ativo=3.5 classe_ucbt=RE ctmt=IJAU10 ramal=1045485 pac=1001045485
New "Load.TW_S10001_BT_1058540_M1_IJAU10_1001058540_002671" bus1="1001058540.2.3.4" phases=1 conn=Delta model=1 kv=0.220000000 kw=2.0 pf=1 status=variable vmaxpu=1.5 vminpu=0.92 enabled=yes ! tipo=TW kw_ativo=2.0 classe_ucbt=RE ctmt=IJAU10 ramal=1058540 pac=1001058540

! ========================================
! ALIMENTADOR IJAU11
! ========================================
New "Load.LDV_S10001_BT_1018052_M1_IJAU11_1001018052_001669" bus1="1001018052.1.4" phases=1 conn=Wye model=1 kv=0.220000000 kw=3.5 pf=1 status=variable vmaxpu=1.5 vminpu=0.92 enabled=yes ! tipo=LDV kw_ativo=3.5 classe_ucbt=RE ctmt=IJAU11 ramal=1018052 pac=1001018052
New "Load.LDV_S10001_BT_1039395_7_M1_IJAU11_1001039395_003040" bus1="1001039395.1.2.3.4" phases=3 conn=Delta model=1 kv=0.220000000 kw=3.5 pf=1 status=variable vmaxpu=1.5 vminpu=0.92 enabled=yes ! tipo=LDV kw_ativo=3.5 classe_ucbt=RE ctmt=IJAU11 ramal=1039395 pac=1001039395
New "Load.LDV_S10001_BT_1016855_M1_IJAU11_1001016855_001482" bus1="1001016855.1.4" phases=1 conn=Wye model=1 kv=0.220000000 kw=3.5 pf=1 status=variable vmaxpu=1.5 vminpu=0.92 enabled=yes ! tipo=LDV kw_ativo=3.5 classe_ucbt=RE ctmt=IJAU11 ramal=1016855 pac=1001016855
New "Load.LDV_S10001_BT_1018437_2_M1_IJAU11_1001018437_001753" bus1="1001018437.1.2.3.4" phases=3 conn=Delta model=1 kv=0.220000000 kw=3.5 pf=1 status=variable vmaxpu=1.5 vminpu=0.92 enabled=yes ! tipo=LDV kw_ativo=3.5 classe_ucbt=RE ctmt=IJAU11 ramal=1018437 pac=1001018437
New "Load.TW_S10001_BT_994616_M1_IJAU11_1000994616_005359" bus1="1000994616.1.2.3.4" phases=3 conn=Delta model=1 kv=0.220000000 kw=2.0 pf=1 status=variable vmaxpu=1.5 vminpu=0.92 enabled=yes ! tipo=TW kw_ativo=2.0 classe_ucbt=RE ctmt=IJAU11 ramal=994616 pac=1000994616
New "Load.TW_S10001_BT_1024576_2_M1_IJAU11_1001024576_002446" bus1="1001024576.1.2.4" phases=1 conn=Delta model=1 kv=0.240000000 kw=2.0 pf=1 status=variable vmaxpu=1.5 vminpu=0.92 enabled=yes ! tipo=TW kw_ativo=2.0 classe_ucbt=RE ctmt=IJAU11 ramal=1024576 pac=1001024576

! ========================================
! ALIMENTADOR IJAU13
! ========================================
New "Load.LDV_S10001_BT_1001035_M1_IJAU13_1001001035_000171" bus1="1001001035.3.4" phases=1 conn=Wye model=1 kv=0.220000000 kw=3.5 pf=1 status=variable vmaxpu=1.5 vminpu=0.92 enabled=yes ! tipo=LDV kw_ativo=3.5 classe_ucbt=RE ctmt=IJAU13 ramal=1001035 pac=1001001035
New "Load.LDV_S10001_BT_976171_M1_IJAU13_1000976171_005910" bus1="1000976171.1.4" phases=1 conn=Wye model=1 kv=0.120000000 kw=3.5 pf=1 status=variable vmaxpu=1.5 vminpu=0.92 enabled=yes ! tipo=LDV kw_ativo=3.5 classe_ucbt=RE ctmt=IJAU13 ramal=976171 pac=1000976171
New "Load.LDV_S10001_BT_972454_1_M1_IJAU13_1000972454_005367" bus1="1000972454.2.3.4" phases=1 conn=Delta model=1 kv=0.220000000 kw=3.5 pf=1 status=variable vmaxpu=1.5 vminpu=0.92 enabled=yes ! tipo=LDV kw_ativo=3.5 classe_ucbt=RE ctmt=IJAU13 ramal=972454 pac=1000972454
New "Load.LDV_S10001_BT_1010639_M1_IJAU13_1001010639_001963" bus1="1001010639.3.4" phases=1 conn=Wye model=1 kv=0.220000000 kw=3.5 pf=1 status=variable vmaxpu=1.5 vminpu=0.92 enabled=yes ! tipo=LDV kw_ativo=3.5 classe_ucbt=RE ctmt=IJAU13 ramal=1010639 pac=1001010639
New "Load.LDV_S10001_BT_992453_19_M2_IJAU13_1000992453_007285" bus1="1000992453.1.2.3.4" phases=3 conn=Delta model=1 kv=0.220000000 kw=3.5 pf=1 status=variable vmaxpu=1.5 vminpu=0.92 enabled=yes ! tipo=LDV kw_ativo=3.5 classe_ucbt=RE ctmt=IJAU13 ramal=992453 pac=1000992453
New "Load.LDV_S10001_BT_1005949_M1_IJAU13_1001005949_000940" bus1="1001005949.2.3.4" phases=1 conn=Delta model=1 kv=0.220000000 kw=3.5 pf=1 status=variable vmaxpu=1.5 vminpu=0.92 enabled=yes ! tipo=LDV kw_ativo=3.5 classe_ucbt=RE ctmt=IJAU13 ramal=1005949 pac=1001005949
New "Load.LDV_S10001_BT_4857566_M1_IJAU13_1004857566_004492" bus1="1004857566.2.4" phases=1 conn=Wye model=1 kv=0.120000000 kw=3.5 pf=1 status=variable vmaxpu=1.5 vminpu=0.92 enabled=yes ! tipo=LDV kw_ativo=3.5 classe_ucbt=RE ctmt=IJAU13 ramal=4857566 pac=1004857566
New "Load.TW_S10001_BT_4227937_1_M1_IJAU13_1004227937_004115" bus1="1004227937.1.2.3.4" phases=3 conn=Delta model=1 kv=0.220000000 kw=2.0 pf=1 status=variable vmaxpu=1.5 vminpu=0.92 enabled=yes ! tipo=TW kw_ativo=2.0 classe_ucbt=RE ctmt=IJAU13 ramal=4227937 pac=1004227937
New "Load.TW_S10001_BT_1005172_M1_IJAU13_1001005172_000879" bus1="1001005172.3.1.4" phases=1 conn=Delta model=1 kv=0.220000000 kw=2.0 pf=1 status=variable vmaxpu=1.5 vminpu=0.92 enabled=yes ! tipo=TW kw_ativo=2.0 classe_ucbt=RE ctmt=IJAU13 ramal=1005172 pac=1001005172
New "Load.TW_S10001_BT_998970_3_M1_IJAU13_1000998970_007672" bus1="1000998970.1.4" phases=1 conn=Wye model=1 kv=0.220000000 kw=2.0 pf=1 status=variable vmaxpu=1.5 vminpu=0.92 enabled=yes ! tipo=TW kw_ativo=2.0 classe_ucbt=RE ctmt=IJAU13 ramal=998970 pac=1000998970
New "Load.TW_S10001_BT_1000433_3_M1_IJAU13_1001000433_000032" bus1="1001000433.1.2.4" phases=1 conn=Delta model=1 kv=0.220000000 kw=2.0 pf=1 status=variable vmaxpu=1.5 vminpu=0.92 enabled=yes ! tipo=TW kw_ativo=2.0 classe_ucbt=RE ctmt=IJAU13 ramal=1000433 pac=1001000433
New "Load.TRUCK_S10001_BT_4982831_M1_IJAU13_1004982831_000009" bus1="1004982831.1.2.3.4" phases=3 conn=Delta model=1 kv=0.220000000 kw=50.0 pf=1 status=variable vmaxpu=1.5 vminpu=0.92 enabled=yes ! tipo=TRUCK kw_ativo=50.0 classe_ucbt=IN ctmt=IJAU13 ramal=4982831 pac=1004982831

! ========================================
! ALIMENTADOR IJAU14
! ========================================
New "Load.LDV_S10001_BT_984851_2_M1_IJAU14_1000984851_002769" bus1="1000984851.2.3.4" phases=1 conn=Delta model=1 kv=0.220000000 kw=3.5 pf=1 status=variable vmaxpu=1.5 vminpu=0.92 enabled=yes ! tipo=LDV kw_ativo=3.5 classe_ucbt=RE ctmt=IJAU14 ramal=984851 pac=1000984851
New "Load.LDV_S10001_BT_991361_2_M2_IJAU14_1000991361_003077" bus1="1000991361.2.3.4" phases=1 conn=Delta model=1 kv=0.220000000 kw=3.5 pf=1 status=variable vmaxpu=1.5 vminpu=0.92 enabled=yes ! tipo=LDV kw_ativo=3.5 classe_ucbt=RE ctmt=IJAU14 ramal=991361 pac=1000991361

! ========================================
! ALIMENTADOR IJAU15
! ========================================
New "Load.LDV_S10001_BT_996891_M1_IJAU15_1000996891_008716" bus1="1000996891.2.4" phases=1 conn=Wye model=1 kv=0.220000000 kw=3.5 pf=1 status=variable vmaxpu=1.5 vminpu=0.92 enabled=yes ! tipo=LDV kw_ativo=3.5 classe_ucbt=RE ctmt=IJAU15 ramal=996891 pac=1000996891
New "Load.LDV_S10001_BT_970683_2_M1_IJAU15_1000970683_007056" bus1="1000970683.3.1.4" phases=1 conn=Delta model=1 kv=0.220000000 kw=3.5 pf=1 status=variable vmaxpu=1.5 vminpu=0.92 enabled=yes ! tipo=LDV kw_ativo=3.5 classe_ucbt=RE ctmt=IJAU15 ramal=970683 pac=1000970683
New "Load.LDV_S10001_BT_1133699_M1_IJAU15_1001133699_002769" bus1="1001133699.3.4" phases=1 conn=Wye model=1 kv=0.220000000 kw=3.5 pf=1 status=variable vmaxpu=1.5 vminpu=0.92 enabled=yes ! tipo=LDV kw_ativo=3.5 classe_ucbt=RE ctmt=IJAU15 ramal=1133699 pac=1001133699
New "Load.LDV_S10001_BT_998172_M1_IJAU15_1000998172_008874" bus1="1000998172.1.4" phases=1 conn=Wye model=1 kv=0.220000000 kw=3.5 pf=1 status=variable vmaxpu=1.5 vminpu=0.92 enabled=yes ! tipo=LDV kw_ativo=3.5 classe_ucbt=RE ctmt=IJAU15 ramal=998172 pac=1000998172
New "Load.LDV_S10001_BT_1185758_M1_IJAU15_1001185758_003453" bus1="1001185758.2.4" phases=1 conn=Wye model=1 kv=0.220000000 kw=3.5 pf=1 status=variable vmaxpu=1.5 vminpu=0.92 enabled=yes ! tipo=LDV kw_ativo=3.5 classe_ucbt=RE ctmt=IJAU15 ramal=1185758 pac=1001185758
New "Load.TW_S10001_BT_3673950_M1_IJAU15_1003673950_004776" bus1="1003673950.1.2.4" phases=1 conn=Delta model=1 kv=0.220000000 kw=2.0 pf=1 status=variable vmaxpu=1.5 vminpu=0.92 enabled=yes ! tipo=TW kw_ativo=2.0 classe_ucbt=RE ctmt=IJAU15 ramal=3673950 pac=1003673950
