New "Load.LDV_BT_1043287_M1_IJAU05_1001043287_002554" bus1="1001043287.1.4" phases=1 conn=Wye model=1 kv=0.220000000 kw=3.5 pf=1 status=variable vmaxpu=1.5 vminpu=0.92 ! tipo=LDV classe_ucbt=RE ctmt=IJAU05 ramal=1043287 pac=1001043287
New "Load.LDV_BT_1029077_1_M2_IJAU05_1001029077_001102" bus1="1001029077.2.4" phases=1 conn=Wye model=1 kv=0.220000000 kw=3.5 pf=1 status=variable vmaxpu=1.5 vminpu=0.92 ! tipo=LDV classe_ucbt=RE ctmt=IJAU05 ramal=1029077 pac=1001029077
New "Load.LDV_BT_1023407_1_M1_IJAU05_1001023407_000289" bus1="1001023407.1.2.4" phases=1 conn=Delta model=1 kv=0.220000000 kw=3.5 pf=1 status=variable vmaxpu=1.5 vminpu=0.92 ! tipo=LDV classe_ucbt=RE ctmt=IJAU05 ramal=1023407 pac=1001023407
New "Load.LDV_BT_4427248_M1_IJAU05_1004427248_004920" bus1="1004427248.1.2.4" phases=1 conn=Delta model=1 kv=0.220000000 kw=3.5 pf=1 status=variable vmaxpu=1.5 vminpu=0.92 ! tipo=LDV classe_ucbt=RE ctmt=IJAU05 ramal=4427248 pac=1004427248
New "Load.LDV_BT_3936961_M1_IJAU05_1003936961_004543" bus1="1003936961.2.4" phases=1 conn=Wye model=1 kv=0.220000000 kw=3.5 pf=1 status=variable vmaxpu=1.5 vminpu=0.92 ! tipo=LDV classe_ucbt=RE ctmt=IJAU05 ramal=3936961 pac=1003936961
New "Load.LDV_BT_1026648_M1_IJAU05_1001026648_000805" bus1="1001026648.3.4" phases=1 conn=Wye model=1 kv=0.220000000 kw=3.5 pf=1 status=variable vmaxpu=1.5 vminpu=0.92 ! tipo=LDV classe_ucbt=RE ctmt=IJAU05 ramal=1026648 pac=1001026648
New "Load.TW_BT_3823176_1_M1_IJAU05_1003823176_004402" bus1="1003823176.1.4" phases=1 conn=Wye model=1 kv=0.120000000 kw=2.0 pf=1 status=variable vmaxpu=1.5 vminpu=0.92 ! tipo=TW classe_ucbt=RE ctmt=IJAU05 ramal=3823176 pac=1003823176
