New "Load.LDV_BT_1024415_M1_IJAU05_1001024415_000461" bus1="1001024415.1.4" phases=1 conn=Wye model=1 kv=0.220000000 kw=3.5 pf=1 status=variable vmaxpu=1.5 vminpu=0.92 ! tipo=LDV classe_ucbt=RE ctmt=IJAU05 ramal=1024415 pac=1001024415
New "Load.LDV_BT_1025983_M1_IJAU05_1001025983_000659" bus1="1001025983.1.4" phases=1 conn=Wye model=1 kv=0.220000000 kw=3.5 pf=1 status=variable vmaxpu=1.5 vminpu=0.92 ! tipo=LDV classe_ucbt=RE ctmt=IJAU05 ramal=1025983 pac=1001025983
New "Load.LDV_BT_1034117_2_M1_IJAU05_1001034117_001704" bus1="1001034117.1.2.3.4" phases=3 conn=Delta model=1 kv=0.220000000 kw=3.5 pf=1 status=variable vmaxpu=1.5 vminpu=0.92 ! tipo=LDV classe_ucbt=RE ctmt=IJAU05 ramal=1034117 pac=1001034117
New "Load.LDV_BT_5024698_M1_IJAU05_1005024698_005268" bus1="1005024698.2.3.4" phases=1 conn=Delta model=1 kv=0.220000000 kw=3.5 pf=1 status=variable vmaxpu=1.5 vminpu=0.92 ! tipo=LDV classe_ucbt=RE ctmt=IJAU05 ramal=5024698 pac=1005024698
New "Load.TW_BT_6300046_M1_IJAU05_1006300046_005536" bus1="1006300046.1.4" phases=1 conn=Wye model=1 kv=0.220000000 kw=2.0 pf=1 status=variable vmaxpu=1.5 vminpu=0.92 ! tipo=TW classe_ucbt=RE ctmt=IJAU05 ramal=6300046 pac=1006300046
New "Load.TW_BT_1035755_1_M2_IJAU05_1001035755_001930" bus1="1001035755.1.2.4" phases=1 conn=Delta model=1 kv=0.220000000 kw=2.0 pf=1 status=variable vmaxpu=1.5 vminpu=0.92 ! tipo=TW classe_ucbt=RE ctmt=IJAU05 ramal=1035755 pac=1001035755
