New "Load.LDV_BT_4311202_M1_IJAU06_1004311202_002206" bus1="1004311202.2.4" phases=1 conn=Wye model=1 kv=0.220000000 kw=3.5 pf=1 status=variable vmaxpu=1.5 vminpu=0.92 ! tipo=LDV classe_ucbt=RE ctmt=IJAU06 ramal=4311202 pac=1004311202
New "Load.LDV_BT_1076992_M1_IJAU06_1001076992_001288" bus1="1001076992.3.1.4" phases=1 conn=Delta model=1 kv=0.220000000 kw=3.5 pf=1 status=variable vmaxpu=1.5 vminpu=0.92 ! tipo=LDV classe_ucbt=RE ctmt=IJAU06 ramal=1076992 pac=1001076992
New "Load.LDV_BT_1223159_1_M2_IJAU06_1001223159_001831" bus1="1001223159.1.2.3.4" phases=3 conn=Delta model=1 kv=0.220000000 kw=3.5 pf=1 status=variable vmaxpu=1.5 vminpu=0.92 ! tipo=LDV classe_ucbt=RE ctmt=IJAU06 ramal=1223159 pac=1001223159
New "Load.LDV_BT_1073520_M1_IJAU06_1001073520_000959" bus1="1001073520.2.4" phases=1 conn=Wye model=1 kv=0.220000000 kw=3.5 pf=1 status=variable vmaxpu=1.5 vminpu=0.92 ! tipo=LDV classe_ucbt=RE ctmt=IJAU06 ramal=1073520 pac=1001073520
New "Load.TW_BT_1070664_2_M2_IJAU06_1001070664_000856" bus1="1001070664.1.2.3.4" phases=3 conn=Delta model=1 kv=0.220000000 kw=2.0 pf=1 status=variable vmaxpu=1.5 vminpu=0.92 ! tipo=TW classe_ucbt=RE ctmt=IJAU06 ramal=1070664 pac=1001070664
New "Load.TW_BT_1078294_M1_IJAU06_1001078294_001447" bus1="1001078294.2.4" phases=1 conn=Wye model=1 kv=0.220000000 kw=2.0 pf=1 status=variable vmaxpu=1.5 vminpu=0.92 ! tipo=TW classe_ucbt=RE ctmt=IJAU06 ramal=1078294 pac=1001078294
