New "Load.LDV_BT_1076446_6_M2_IJAU06_1001076446_001240" bus1="1001076446.1.2.3.4" phases=3 conn=Delta model=1 kv=0.220000000 kw=3.5 pf=1 status=variable vmaxpu=1.5 vminpu=0.92 ! tipo=LDV classe_ucbt=RE ctmt=IJAU06 ramal=1076446 pac=1001076446
New "Load.LDV_BT_970242_M1_IJAU06_1000970242_002763" bus1="1000970242.1.4" phases=1 conn=Wye model=1 kv=0.220000000 kw=3.5 pf=1 status=variable vmaxpu=1.5 vminpu=0.92 ! tipo=LDV classe_ucbt=RE ctmt=IJAU06 ramal=970242 pac=1000970242
New "Load.LDV_BT_1197427_1_M1_IJAU06_1001197427_001794" bus1="1001197427.3.4" phases=1 conn=Wye model=1 kv=0.220000000 kw=3.5 pf=1 status=variable vmaxpu=1.5 vminpu=0.92 ! tipo=LDV classe_ucbt=RE ctmt=IJAU06 ramal=1197427 pac=1001197427
New "Load.TW_BT_1079659_3_M2_IJAU06_1001079659_001505" bus1="1001079659.1.2.3.4" phases=3 conn=Delta model=1 kv=0.220000000 kw=2.0 pf=1 status=variable vmaxpu=1.5 vminpu=0.92 ! tipo=TW classe_ucbt=RE ctmt=IJAU06 ramal=1079659 pac=1001079659
New "Load.TW_BT_1077580_M1_IJAU06_1001077580_001384" bus1="1001077580.1.2.4" phases=1 conn=Delta model=1 kv=0.220000000 kw=2.0 pf=1 status=variable vmaxpu=1.5 vminpu=0.92 ! tipo=TW classe_ucbt=RE ctmt=IJAU06 ramal=1077580 pac=1001077580
