New "Load.LDV_BT_1196734_M1_IJAU06_1001196734_001737" bus1="1001196734.1.2.4" phases=1 conn=Delta model=1 kv=0.220000000 kw=3.5 pf=1 status=variable vmaxpu=1.5 vminpu=0.92 ! tipo=LDV classe_ucbt=RE ctmt=IJAU06 ramal=1196734 pac=1001196734
New "Load.LDV_BT_1249479_4_M2_IJAU06_1001249479_001912" bus1="1001249479.1.2.3.4" phases=3 conn=Delta model=1 kv=0.220000000 kw=3.5 pf=1 status=variable vmaxpu=1.5 vminpu=0.92 ! tipo=LDV classe_ucbt=RE ctmt=IJAU06 ramal=1249479 pac=1001249479
New "Load.LDV_BT_1076061_M1_IJAU06_1001076061_001161" bus1="1001076061.2.3.4" phases=1 conn=Delta model=1 kv=0.220000000 kw=3.5 pf=1 status=variable vmaxpu=1.5 vminpu=0.92 ! tipo=LDV classe_ucbt=RE ctmt=IJAU06 ramal=1076061 pac=1001076061
New "Load.LDV_BT_1065449_M1_IJAU06_1001065449_000527" bus1="1001065449.2.4" phases=1 conn=Wye model=1 kv=0.220000000 kw=3.5 pf=1 status=variable vmaxpu=1.5 vminpu=0.92 ! tipo=LDV classe_ucbt=RE ctmt=IJAU06 ramal=1065449 pac=1001065449
New "Load.LDV_BT_1197315_1_M1_IJAU06_1001197315_001766" bus1="1001197315.1.2.3.4" phases=3 conn=Delta model=1 kv=0.220000000 kw=3.5 pf=1 status=variable vmaxpu=1.5 vminpu=0.92 ! tipo=LDV classe_ucbt=RE ctmt=IJAU06 ramal=1197315 pac=1001197315
