New "Load.LDV_BT_1061914_3_M2_IJAU07_1001061914_002698" bus1="1001061914.1.2.3.4" phases=3 conn=Delta model=1 kv=0.220000000 kw=3.5 pf=1 status=variable vmaxpu=1.5 vminpu=0.92 ! tipo=LDV classe_ucbt=RE ctmt=IJAU07 ramal=1061914 pac=1001061914
New "Load.LDV_BT_3769703_M1_IJAU07_1003769703_006337" bus1="1003769703.1.2.4" phases=1 conn=Delta model=1 kv=0.240000000 kw=3.5 pf=1 status=variable vmaxpu=1.5 vminpu=0.92 ! tipo=LDV classe_ucbt=RE ctmt=IJAU07 ramal=3769703 pac=1003769703
New "Load.LDV_BT_1061431_2_M1_IJAU07_1001061431_002571" bus1="1001061431.1.2.3.4" phases=3 conn=Delta model=1 kv=0.220000000 kw=3.5 pf=1 status=variable vmaxpu=1.5 vminpu=0.92 ! tipo=LDV classe_ucbt=RE ctmt=IJAU07 ramal=1061431 pac=1001061431
New "Load.LDV_BT_1050231_12_M1_IJAU07_1001050231_001066" bus1="1001050231.1.2.3.4" phases=3 conn=Delta model=1 kv=0.220000000 kw=3.5 pf=1 status=variable vmaxpu=1.5 vminpu=0.92 ! tipo=LDV classe_ucbt=RE ctmt=IJAU07 ramal=1050231 pac=1001050231
New "Load.LDV_BT_1048061_M1_IJAU07_1001048061_000702" bus1="1001048061.1.2.4" phases=1 conn=Delta model=1 kv=0.220000000 kw=3.5 pf=1 status=variable vmaxpu=1.5 vminpu=0.92 ! tipo=LDV classe_ucbt=RE ctmt=IJAU07 ramal=1048061 pac=1001048061
New "Load.TW_BT_1228871_6_M1_IJAU07_1001228871_005835" bus1="1001228871.1.2.3.4" phases=3 conn=Delta model=1 kv=0.220000000 kw=2.0 pf=1 status=variable vmaxpu=1.5 vminpu=0.92 ! tipo=TW classe_ucbt=RE ctmt=IJAU07 ramal=1228871 pac=1001228871
New "Load.TW_BT_1074458_M1_IJAU07_1001074458_003894" bus1="1001074458.2.4" phases=1 conn=Wye model=1 kv=0.220000000 kw=2.0 pf=1 status=variable vmaxpu=1.5 vminpu=0.92 ! tipo=TW classe_ucbt=RE ctmt=IJAU07 ramal=1074458 pac=1001074458
New "Load.TW_BT_4010769_M1_IJAU07_1004010769_006664" bus1="1004010769.3.4" phases=1 conn=Wye model=1 kv=0.220000000 kw=2.0 pf=1 status=variable vmaxpu=1.5 vminpu=0.92 ! tipo=TW classe_ucbt=RE ctmt=IJAU07 ramal=4010769 pac=1004010769
New "Load.TW_BT_1057042_4_M2_IJAU07_1001057042_002062" bus1="1001057042.1.2.3.4" phases=3 conn=Delta model=1 kv=0.220000000 kw=2.0 pf=1 status=variable vmaxpu=1.5 vminpu=0.92 ! tipo=TW classe_ucbt=RE ctmt=IJAU07 ramal=1057042 pac=1001057042
New "Load.TW_BT_1085238_M1_IJAU07_1001085238_005073" bus1="1001085238.1.2.4" phases=1 conn=Delta model=1 kv=0.240000000 kw=2.0 pf=1 status=variable vmaxpu=1.5 vminpu=0.92 ! tipo=TW classe_ucbt=RE ctmt=IJAU07 ramal=1085238 pac=1001085238
