New "Load.LDV_BT_4382560_7_M2_IJAU07_1004382560_007025" bus1="1004382560.1.2.3.4" phases=3 conn=Delta model=1 kv=0.220000000 kw=3.5 pf=1 status=variable vmaxpu=1.5 vminpu=0.92 ! tipo=LDV classe_ucbt=RE ctmt=IJAU07 ramal=4382560 pac=1004382560
New "Load.LDV_BT_1077846_M1_IJAU07_1001077846_004032" bus1="1001077846.1.2.3.4" phases=3 conn=Delta model=1 kv=0.220000000 kw=3.5 pf=1 status=variable vmaxpu=1.5 vminpu=0.92 ! tipo=LDV classe_ucbt=RE ctmt=IJAU07 ramal=1077846 pac=1001077846
New "Load.LDV_BT_1063272_M1_IJAU07_1001063272_002908" bus1="1001063272.1.4" phases=1 conn=Wye model=1 kv=0.220000000 kw=3.5 pf=1 status=variable vmaxpu=1.5 vminpu=0.92 ! tipo=LDV classe_ucbt=RE ctmt=IJAU07 ramal=1063272 pac=1001063272
New "Load.LDV_BT_1048152_2_M2_IJAU07_1001048152_000730" bus1="1001048152.1.2.3.4" phases=3 conn=Delta model=1 kv=0.220000000 kw=3.5 pf=1 status=variable vmaxpu=1.5 vminpu=0.92 ! tipo=LDV classe_ucbt=RE ctmt=IJAU07 ramal=1048152 pac=1001048152
New "Load.LDV_BT_1085070_M1_IJAU07_1001085070_005037" bus1="1001085070.2.4" phases=1 conn=Wye model=1 kv=0.220000000 kw=3.5 pf=1 status=variable vmaxpu=1.5 vminpu=0.92 ! tipo=LDV classe_ucbt=RE ctmt=IJAU07 ramal=1085070 pac=1001085070
New "Load.LDV_BT_1057329_M1_IJAU07_1001057329_002128" bus1="1001057329.1.2.3.4" phases=3 conn=Delta model=1 kv=0.220000000 kw=3.5 pf=1 status=variable vmaxpu=1.5 vminpu=0.92 ! tipo=LDV classe_ucbt=RE ctmt=IJAU07 ramal=1057329 pac=1001057329
New "Load.TW_BT_3865176_M1_IJAU07_1003865176_006496" bus1="1003865176.2.4" phases=1 conn=Wye model=1 kv=0.120000000 kw=2.0 pf=1 status=variable vmaxpu=1.5 vminpu=0.92 ! tipo=TW classe_ucbt=RE ctmt=IJAU07 ramal=3865176 pac=1003865176
New "Load.TW_BT_1041747_1_M2_IJAU07_1001041747_000478" bus1="1001041747.1.2.3.4" phases=3 conn=Delta model=1 kv=0.220000000 kw=2.0 pf=1 status=variable vmaxpu=1.5 vminpu=0.92 ! tipo=TW classe_ucbt=RE ctmt=IJAU07 ramal=1041747 pac=1001041747
New "Load.TW_BT_1060836_M1_IJAU07_1001060836_002482" bus1="1001060836.3.1.4" phases=1 conn=Delta model=1 kv=0.220000000 kw=2.0 pf=1 status=variable vmaxpu=1.5 vminpu=0.92 ! tipo=TW classe_ucbt=RE ctmt=IJAU07 ramal=1060836 pac=1001060836
