New "Load.LDV_BT_1060283_M1_IJAU07_1001060283_002395" bus1="1001060283.1.2.3.4" phases=3 conn=Delta model=1 kv=0.220000000 kw=3.5 pf=1 status=variable vmaxpu=1.5 vminpu=0.92 ! tipo=LDV classe_ucbt=RE ctmt=IJAU07 ramal=1060283 pac=1001060283
New "Load.LDV_BT_1082543_M2_IJAU07_1001082543_004629" bus1="1001082543.1.4" phases=1 conn=Wye model=1 kv=0.220000000 kw=3.5 pf=1 status=variable vmaxpu=1.5 vminpu=0.92 ! tipo=LDV classe_ucbt=RE ctmt=IJAU07 ramal=1082543 pac=1001082543
New "Load.LDV_BT_1053311_1_M1_IJAU07_1001053311_001637" bus1="1001053311.3.4" phases=1 conn=Wye model=1 kv=0.220000000 kw=3.5 pf=1 status=variable vmaxpu=1.5 vminpu=0.92 ! tipo=LDV classe_ucbt=RE ctmt=IJAU07 ramal=1053311 pac=1001053311
New "Load.LDV_BT_3680474_M1_IJAU07_1003680474_006127" bus1="1003680474.1.4" phases=1 conn=Wye model=1 kv=0.120000000 kw=3.5 pf=1 status=variable vmaxpu=1.5 vminpu=0.92 ! tipo=LDV classe_ucbt=RE ctmt=IJAU07 ramal=3680474 pac=1003680474
New "Load.TW_BT_1081199_3_M1_IJAU07_1001081199_004383" bus1="1001081199.1.4" phases=1 conn=Wye model=1 kv=0.220000000 kw=2.0 pf=1 status=variable vmaxpu=1.5 vminpu=0.92 ! tipo=TW classe_ucbt=RE ctmt=IJAU07 ramal=1081199 pac=1001081199
New "Load.TW_BT_1062187_M1_IJAU07_1001062187_002767" bus1="1001062187.1.2.3.4" phases=3 conn=Delta model=1 kv=0.220000000 kw=2.0 pf=1 status=variable vmaxpu=1.5 vminpu=0.92 ! tipo=TW classe_ucbt=RE ctmt=IJAU07 ramal=1062187 pac=1001062187
New "Load.TW_BT_1200087_M1_IJAU07_1001200087_005707" bus1="1001200087.1.4" phases=1 conn=Wye model=1 kv=0.120000000 kw=2.0 pf=1 status=variable vmaxpu=1.5 vminpu=0.92 ! tipo=TW classe_ucbt=RE ctmt=IJAU07 ramal=1200087 pac=1001200087
