New "Load.LDV_BT_1060696_1_M1_IJAU07_1001060696_002454" bus1="1001060696.3.1.4" phases=1 conn=Delta model=1 kv=0.220000000 kw=3.5 pf=1 status=variable vmaxpu=1.5 vminpu=0.92 ! tipo=LDV classe_ucbt=RE ctmt=IJAU07 ramal=1060696 pac=1001060696
New "Load.LDV_BT_1057238_1_M2_IJAU07_1001057238_002108" bus1="1001057238.2.3.4" phases=1 conn=Delta model=1 kv=0.220000000 kw=3.5 pf=1 status=variable vmaxpu=1.5 vminpu=0.92 ! tipo=LDV classe_ucbt=RE ctmt=IJAU07 ramal=1057238 pac=1001057238
New "Load.LDV_BT_3891216_4_M1_IJAU07_1003891216_006579" bus1="1003891216.1.2.3.4" phases=3 conn=Delta model=1 kv=0.220000000 kw=3.5 pf=1 status=variable vmaxpu=1.5 vminpu=0.92 ! tipo=LDV classe_ucbt=RE ctmt=IJAU07 ramal=3891216 pac=1003891216
New "Load.LDV_BT_1052268_1_M1_IJAU07_1001052268_001349" bus1="1001052268.1.4" phases=1 conn=Wye model=1 kv=0.220000000 kw=3.5 pf=1 status=variable vmaxpu=1.5 vminpu=0.92 ! tipo=LDV classe_ucbt=RE ctmt=IJAU07 ramal=1052268 pac=1001052268
New "Load.LDV_BT_1053325_1_M2_IJAU07_1001053325_001641" bus1="1001053325.1.2.4" phases=1 conn=Delta model=1 kv=0.220000000 kw=3.5 pf=1 status=variable vmaxpu=1.5 vminpu=0.92 ! tipo=LDV classe_ucbt=RE ctmt=IJAU07 ramal=1053325 pac=1001053325
New "Load.TW_BT_4423545_1_M2_IJAU07_1004423545_007059" bus1="1004423545.1.2.3.4" phases=3 conn=Delta model=1 kv=0.220000000 kw=2.0 pf=1 status=variable vmaxpu=1.5 vminpu=0.92 ! tipo=TW classe_ucbt=RE ctmt=IJAU07 ramal=4423545 pac=1004423545
New "Load.TW_BT_4286520_M1_IJAU07_1004286520_006913" bus1="1004286520.1.4" phases=1 conn=Wye model=1 kv=0.120000000 kw=2.0 pf=1 status=variable vmaxpu=1.5 vminpu=0.92 ! tipo=TW classe_ucbt=RE ctmt=IJAU07 ramal=4286520 pac=1004286520
New "Load.TW_BT_1054529_2_M2_IJAU07_1001054529_001836" bus1="1001054529.1.2.3.4" phases=3 conn=Delta model=1 kv=0.220000000 kw=2.0 pf=1 status=variable vmaxpu=1.5 vminpu=0.92 ! tipo=TW classe_ucbt=RE ctmt=IJAU07 ramal=1054529 pac=1001054529
New "Load.TW_BT_4423545_7_M2_IJAU07_1004423545_007071" bus1="1004423545.1.2.3.4" phases=3 conn=Delta model=1 kv=0.220000000 kw=2.0 pf=1 status=variable vmaxpu=1.5 vminpu=0.92 ! tipo=TW classe_ucbt=RE ctmt=IJAU07 ramal=4423545 pac=1004423545
New "Load.TW_BT_1053339_1_M1_IJAU07_1001053339_001643" bus1="1001053339.3.4" phases=1 conn=Wye model=1 kv=0.220000000 kw=2.0 pf=1 status=variable vmaxpu=1.5 vminpu=0.92 ! tipo=TW classe_ucbt=RE ctmt=IJAU07 ramal=1053339 pac=1001053339
