New "Load.LDV_BT_1032346_3_M2_IJAU10_1001032346_000766" bus1="1001032346.1.2.3.4" phases=3 conn=Delta model=1 kv=0.220000000 kw=3.5 pf=1 status=variable vmaxpu=1.5 vminpu=0.92 ! tipo=LDV classe_ucbt=RE ctmt=IJAU10 ramal=1032346 pac=1001032346
New "Load.LDV_BT_3751671_13_M1_IJAU10_1003751671_004392" bus1="1003751671.1.2.3.4" phases=3 conn=Delta model=1 kv=0.220000000 kw=3.5 pf=1 status=variable vmaxpu=1.5 vminpu=0.92 ! tipo=LDV classe_ucbt=RE ctmt=IJAU10 ramal=3751671 pac=1003751671
New "Load.LDV_BT_1051603_M1_IJAU10_1001051603_002131" bus1="1001051603.2.4" phases=1 conn=Wye model=1 kv=0.220000000 kw=3.5 pf=1 status=variable vmaxpu=1.5 vminpu=0.92 ! tipo=LDV classe_ucbt=RE ctmt=IJAU10 ramal=1051603 pac=1001051603
New "Load.LDV_BT_1058281_M1_IJAU10_1001058281_002647" bus1="1001058281.1.4" phases=1 conn=Wye model=1 kv=0.220000000 kw=3.5 pf=1 status=variable vmaxpu=1.5 vminpu=0.92 ! tipo=LDV classe_ucbt=RE ctmt=IJAU10 ramal=1058281 pac=1001058281
New "Load.LDV_BT_4247817_M1_IJAU10_1004247817_004594" bus1="1004247817.1.2.4" phases=1 conn=Delta model=1 kv=0.220000000 kw=3.5 pf=1 status=variable vmaxpu=1.5 vminpu=0.92 ! tipo=LDV classe_ucbt=RE ctmt=IJAU10 ramal=4247817 pac=1004247817
New "Load.LDV_BT_1064609_M1_IJAU10_1001064609_003326" bus1="1001064609.3.4" phases=1 conn=Wye model=1 kv=0.220000000 kw=3.5 pf=1 status=variable vmaxpu=1.5 vminpu=0.92 ! tipo=LDV classe_ucbt=RE ctmt=IJAU10 ramal=1064609 pac=1001064609
