New "Load.LDV_BT_1049041_1_M1_IJAU10_1001049041_001997" bus1="1001049041.1.2.3.4" phases=3 conn=Delta model=1 kv=0.220000000 kw=3.5 pf=1 status=variable vmaxpu=1.5 vminpu=0.92 ! tipo=LDV classe_ucbt=RE ctmt=IJAU10 ramal=1049041 pac=1001049041
New "Load.LDV_BT_1067157_2_M1_IJAU10_1001067157_003543" bus1="1001067157.2.4" phases=1 conn=Wye model=1 kv=0.220000000 kw=3.5 pf=1 status=variable vmaxpu=1.5 vminpu=0.92 ! tipo=LDV classe_ucbt=RE ctmt=IJAU10 ramal=1067157 pac=1001067157
New "Load.LDV_BT_6860067_6_M2_IJAU10_1006860067_005166" bus1="1006860067.1.2.3.4" phases=3 conn=Delta model=1 kv=0.220000000 kw=3.5 pf=1 status=variable vmaxpu=1.5 vminpu=0.92 ! tipo=LDV classe_ucbt=RE ctmt=IJAU10 ramal=6860067 pac=1006860067
New "Load.LDV_BT_1056398_M1_IJAU10_1001056398_002428" bus1="1001056398.1.4" phases=1 conn=Wye model=1 kv=0.220000000 kw=3.5 pf=1 status=variable vmaxpu=1.5 vminpu=0.92 ! tipo=LDV classe_ucbt=RE ctmt=IJAU10 ramal=1056398 pac=1001056398
New "Load.LDV_BT_1046059_M1_IJAU10_1001046059_001694" bus1="1001046059.2.3.4" phases=1 conn=Delta model=1 kv=0.220000000 kw=3.5 pf=1 status=variable vmaxpu=1.5 vminpu=0.92 ! tipo=LDV classe_ucbt=RE ctmt=IJAU10 ramal=1046059 pac=1001046059
New "Load.LDV_BT_1198267_2_M1_IJAU10_1001198267_004103" bus1="1001198267.1.2.3.4" phases=3 conn=Delta model=1 kv=0.220000000 kw=3.5 pf=1 status=variable vmaxpu=1.5 vminpu=0.92 ! tipo=LDV classe_ucbt=RE ctmt=IJAU10 ramal=1198267 pac=1001198267
New "Load.LDV_BT_1063363_1_M2_IJAU10_1001063363_003192" bus1="1001063363.1.2.3.4" phases=3 conn=Delta model=1 kv=0.220000000 kw=3.5 pf=1 status=variable vmaxpu=1.5 vminpu=0.92 ! tipo=LDV classe_ucbt=RE ctmt=IJAU10 ramal=1063363 pac=1001063363
New "Load.TW_BT_1066072_1_M1_IJAU10_1001066072_003473" bus1="1001066072.1.4" phases=1 conn=Wye model=1 kv=0.220000000 kw=2.0 pf=1 status=variable vmaxpu=1.5 vminpu=0.92 ! tipo=TW classe_ucbt=RE ctmt=IJAU10 ramal=1066072 pac=1001066072
