New "Load.LDV_BT_1017660_1_M1_IJAU11_1001017660_001573" bus1="1001017660.1.2.3.4" phases=3 conn=Delta model=1 kv=0.220000000 kw=3.5 pf=1 status=variable vmaxpu=1.5 vminpu=0.92 ! tipo=LDV classe_ucbt=RE ctmt=IJAU11 ramal=1017660 pac=1001017660
New "Load.LDV_BT_1018269_M1_IJAU11_1001018269_001715" bus1="1001018269.2.4" phases=1 conn=Wye model=1 kv=0.220000000 kw=3.5 pf=1 status=variable vmaxpu=1.5 vminpu=0.92 ! tipo=LDV classe_ucbt=RE ctmt=IJAU11 ramal=1018269 pac=1001018269
New "Load.LDV_BT_1012431_1_M2_IJAU11_1001012431_000709" bus1="1001012431.1.2.4" phases=1 conn=Delta model=1 kv=0.220000000 kw=3.5 pf=1 status=variable vmaxpu=1.5 vminpu=0.92 ! tipo=LDV classe_ucbt=RE ctmt=IJAU11 ramal=1012431 pac=1001012431
New "Load.LDV_BT_1020733_3_M1_IJAU11_1001020733_002032" bus1="1001020733.1.2.3.4" phases=3 conn=Delta model=1 kv=0.220000000 kw=3.5 pf=1 status=variable vmaxpu=1.5 vminpu=0.92 ! tipo=LDV classe_ucbt=RE ctmt=IJAU11 ramal=1020733 pac=1001020733
New "Load.LDV_BT_992817_M1_IJAU11_1000992817_005266" bus1="1000992817.2.4" phases=1 conn=Wye model=1 kv=0.220000000 kw=3.5 pf=1 status=variable vmaxpu=1.5 vminpu=0.92 ! tipo=LDV classe_ucbt=RE ctmt=IJAU11 ramal=992817 pac=1000992817
New "Load.LDV_BT_1037904_M1_IJAU11_1001037904_002947" bus1="1001037904.1.2.3.4" phases=3 conn=Delta model=1 kv=0.220000000 kw=3.5 pf=1 status=variable vmaxpu=1.5 vminpu=0.92 ! tipo=LDV classe_ucbt=RE ctmt=IJAU11 ramal=1037904 pac=1001037904
New "Load.TW_BT_1018962_1_M1_IJAU11_1001018962_001826" bus1="1001018962.3.4" phases=1 conn=Wye model=1 kv=0.220000000 kw=2.0 pf=1 status=variable vmaxpu=1.5 vminpu=0.92 ! tipo=TW classe_ucbt=RE ctmt=IJAU11 ramal=1018962 pac=1001018962
