New "Load.LDV_BT_1005410_M1_IJAU11_1001005410_000077" bus1="1001005410.3.4" phases=1 conn=Wye model=1 kv=0.220000000 kw=3.5 pf=1 status=variable vmaxpu=1.5 vminpu=0.92 ! tipo=LDV classe_ucbt=RE ctmt=IJAU11 ramal=1005410 pac=1001005410
New "Load.LDV_BT_1021503_M1_IJAU11_1001021503_002141" bus1="1001021503.2.4" phases=1 conn=Wye model=1 kv=0.220000000 kw=3.5 pf=1 status=variable vmaxpu=1.5 vminpu=0.92 ! tipo=LDV classe_ucbt=RE ctmt=IJAU11 ramal=1021503 pac=1001021503
New "Load.LDV_BT_998270_M1_IJAU11_1000998270_005555" bus1="1000998270.2.4" phases=1 conn=Wye model=1 kv=0.120000000 kw=3.5 pf=1 status=variable vmaxpu=1.5 vminpu=0.92 ! tipo=LDV classe_ucbt=RE ctmt=IJAU11 ramal=998270 pac=1000998270
New "Load.LDV_BT_1017107_2_M2_IJAU11_1001017107_001524" bus1="1001017107.1.2.3.4" phases=3 conn=Delta model=1 kv=0.220000000 kw=3.5 pf=1 status=variable vmaxpu=1.5 vminpu=0.92 ! tipo=LDV classe_ucbt=RE ctmt=IJAU11 ramal=1017107 pac=1001017107
New "Load.LDV_BT_1020446_M1_IJAU11_1001020446_001974" bus1="1001020446.1.4" phases=1 conn=Wye model=1 kv=0.220000000 kw=3.5 pf=1 status=variable vmaxpu=1.5 vminpu=0.92 ! tipo=LDV classe_ucbt=RE ctmt=IJAU11 ramal=1020446 pac=1001020446
New "Load.TW_BT_1001245_M1_IJAU11_1001001245_000002" bus1="1001001245.2.3.4" phases=1 conn=Delta model=1 kv=0.220000000 kw=2.0 pf=1 status=variable vmaxpu=1.5 vminpu=0.92 ! tipo=TW classe_ucbt=RE ctmt=IJAU11 ramal=1001245 pac=1001001245
