New "Load.LDV_BT_3866401_1_M2_IJAU13_1003866401_003761" bus1="1003866401.1.4" phases=1 conn=Wye model=1 kv=0.220000000 kw=3.5 pf=1 status=variable vmaxpu=1.5 vminpu=0.92 ! tipo=LDV classe_ucbt=RE ctmt=IJAU13 ramal=3866401 pac=1003866401
New "Load.LDV_BT_1000566_2_M1_IJAU13_1001000566_000071" bus1="1001000566.1.2.4" phases=1 conn=Delta model=1 kv=0.220000000 kw=3.5 pf=1 status=variable vmaxpu=1.5 vminpu=0.92 ! tipo=LDV classe_ucbt=RE ctmt=IJAU13 ramal=1000566 pac=1001000566
New "Load.LDV_BT_3957163_M1_IJAU13_1003957163_003893" bus1="1003957163.1.2.4" phases=1 conn=Delta model=1 kv=0.240000000 kw=3.5 pf=1 status=variable vmaxpu=1.5 vminpu=0.92 ! tipo=LDV classe_ucbt=RE ctmt=IJAU13 ramal=3957163 pac=1003957163
New "Load.LDV_BT_977438_2_M1_IJAU13_1000977438_006074" bus1="1000977438.2.4" phases=1 conn=Wye model=1 kv=0.220000000 kw=3.5 pf=1 status=variable vmaxpu=1.5 vminpu=0.92 ! tipo=LDV classe_ucbt=RE ctmt=IJAU13 ramal=977438 pac=1000977438
New "Load.LDV_BT_998760_3_M2_IJAU13_1000998760_007621" bus1="1000998760.1.4" phases=1 conn=Wye model=1 kv=0.220000000 kw=3.5 pf=1 status=variable vmaxpu=1.5 vminpu=0.92 ! tipo=LDV classe_ucbt=RE ctmt=IJAU13 ramal=998760 pac=1000998760
New "Load.TW_BT_1008665_M1_IJAU13_1001008665_001678" bus1="1001008665.2.4" phases=1 conn=Wye model=1 kv=0.220000000 kw=2.0 pf=1 status=variable vmaxpu=1.5 vminpu=0.92 ! tipo=TW classe_ucbt=RE ctmt=IJAU13 ramal=1008665 pac=1001008665
New "Load.TW_BT_992404_2_M1_IJAU13_1000992404_007238" bus1="1000992404.1.4" phases=1 conn=Wye model=1 kv=0.220000000 kw=2.0 pf=1 status=variable vmaxpu=1.5 vminpu=0.92 ! tipo=TW classe_ucbt=RE ctmt=IJAU13 ramal=992404 pac=1000992404
New "Load.TW_BT_4253298_1_M2_IJAU13_1004253298_004153" bus1="1004253298.1.4" phases=1 conn=Wye model=1 kv=0.220000000 kw=2.0 pf=1 status=variable vmaxpu=1.5 vminpu=0.92 ! tipo=TW classe_ucbt=RE ctmt=IJAU13 ramal=4253298 pac=1004253298
New "Load.TW_BT_1010821_4_M1_IJAU13_1001010821_002005" bus1="1001010821.1.2.3.4" phases=3 conn=Delta model=1 kv=0.220000000 kw=2.0 pf=1 status=variable vmaxpu=1.5 vminpu=0.92 ! tipo=TW classe_ucbt=RE ctmt=IJAU13 ramal=1010821 pac=1001010821
