New "Load.LDV_BT_976276_1_M2_IJAU13_1000976276_005931" bus1="1000976276.1.4" phases=1 conn=Wye model=1 kv=0.120000000 kw=3.5 pf=1 status=variable vmaxpu=1.5 vminpu=0.92 ! tipo=LDV classe_ucbt=RE ctmt=IJAU13 ramal=976276 pac=1000976276
New "Load.LDV_BT_976157_M1_IJAU13_1000976157_005908" bus1="1000976157.1.4" phases=1 conn=Wye model=1 kv=0.120000000 kw=3.5 pf=1 status=variable vmaxpu=1.5 vminpu=0.92 ! tipo=LDV classe_ucbt=RE ctmt=IJAU13 ramal=976157 pac=1000976157
New "Load.LDV_BT_4434486_M1_IJAU13_1004434486_004306" bus1="1004434486.1.4" phases=1 conn=Wye model=1 kv=0.120000000 kw=3.5 pf=1 status=variable vmaxpu=1.5 vminpu=0.92 ! tipo=LDV classe_ucbt=RE ctmt=IJAU13 ramal=4434486 pac=1004434486
New "Load.LDV_BT_999082_M1_IJAU13_1000999082_007696" bus1="1000999082.2.3.4" phases=1 conn=Delta model=1 kv=0.220000000 kw=3.5 pf=1 status=variable vmaxpu=1.5 vminpu=0.92 ! tipo=LDV classe_ucbt=RE ctmt=IJAU13 ramal=999082 pac=1000999082
New "Load.LDV_BT_5000177_M2_IJAU13_1005000177_004595" bus1="1005000177.1.4" phases=1 conn=Wye model=1 kv=0.220000000 kw=3.5 pf=1 status=variable vmaxpu=1.5 vminpu=0.92 ! tipo=LDV classe_ucbt=RE ctmt=IJAU13 ramal=5000177 pac=1005000177
New "Load.LDV_BT_990283_M1_IJAU13_1000990283_007060" bus1="1000990283.1.2.4" phases=1 conn=Delta model=1 kv=0.220000000 kw=3.5 pf=1 status=variable vmaxpu=1.5 vminpu=0.92 ! tipo=LDV classe_ucbt=RE ctmt=IJAU13 ramal=990283 pac=1000990283
New "Load.TW_BT_978978_M1_IJAU13_1000978978_006264" bus1="1000978978.2.4" phases=1 conn=Wye model=1 kv=0.120000000 kw=2.0 pf=1 status=variable vmaxpu=1.5 vminpu=0.92 ! tipo=TW classe_ucbt=RE ctmt=IJAU13 ramal=978978 pac=1000978978
New "Load.TW_BT_4261236_2_M2_IJAU13_1004261236_004161" bus1="1004261236.1.4" phases=1 conn=Wye model=1 kv=0.220000000 kw=2.0 pf=1 status=variable vmaxpu=1.5 vminpu=0.92 ! tipo=TW classe_ucbt=RE ctmt=IJAU13 ramal=4261236 pac=1004261236
New "Load.TW_BT_999726_M1_IJAU13_1000999726_007842" bus1="1000999726.3.4" phases=1 conn=Wye model=1 kv=0.220000000 kw=2.0 pf=1 status=variable vmaxpu=1.5 vminpu=0.92 ! tipo=TW classe_ucbt=RE ctmt=IJAU13 ramal=999726 pac=1000999726
New "Load.TW_BT_971250_1_M2_IJAU13_1000971250_005147" bus1="1000971250.3.1.4" phases=1 conn=Delta model=1 kv=0.220000000 kw=2.0 pf=1 status=variable vmaxpu=1.5 vminpu=0.92 ! tipo=TW classe_ucbt=RE ctmt=IJAU13 ramal=971250 pac=1000971250
New "Load.TW_BT_1012186_1_M1_IJAU13_1001012186_002057" bus1="1001012186.1.4" phases=1 conn=Wye model=1 kv=0.120000000 kw=2.0 pf=1 status=variable vmaxpu=1.5 vminpu=0.92 ! tipo=TW classe_ucbt=RE ctmt=IJAU13 ramal=1012186 pac=1001012186
