New "Load.LDV_BT_1016204_M1_IJAU13_1001016204_002242" bus1="1001016204.3.4" phases=1 conn=Wye model=1 kv=0.220000000 kw=3.5 pf=1 status=variable vmaxpu=1.5 vminpu=0.92 ! tipo=LDV classe_ucbt=RE ctmt=IJAU13 ramal=1016204 pac=1001016204
New "Load.LDV_BT_1002561_M1_IJAU13_1001002561_000445" bus1="1001002561.3.4" phases=1 conn=Wye model=1 kv=0.220000000 kw=3.5 pf=1 status=variable vmaxpu=1.5 vminpu=0.92 ! tipo=LDV classe_ucbt=RE ctmt=IJAU13 ramal=1002561 pac=1001002561
New "Load.LDV_BT_971397_M1_IJAU13_1000971397_005183" bus1="1000971397.3.4" phases=1 conn=Wye model=1 kv=0.220000000 kw=3.5 pf=1 status=variable vmaxpu=1.5 vminpu=0.92 ! tipo=LDV classe_ucbt=RE ctmt=IJAU13 ramal=971397 pac=1000971397
New "Load.LDV_BT_1002323_2_M1_IJAU13_1001002323_000400" bus1="1001002323.2.4" phases=1 conn=Wye model=1 kv=0.220000000 kw=3.5 pf=1 status=variable vmaxpu=1.5 vminpu=0.92 ! tipo=LDV classe_ucbt=RE ctmt=IJAU13 ramal=1002323 pac=1001002323
New "Load.TW_BT_1003800_2_M2_IJAU13_1001003800_000715" bus1="1001003800.1.2.4" phases=1 conn=Delta model=1 kv=0.220000000 kw=2.0 pf=1 status=variable vmaxpu=1.5 vminpu=0.92 ! tipo=TW classe_ucbt=RE ctmt=IJAU13 ramal=1003800 pac=1001003800
New "Load.TW_BT_988029_1_M2_IJAU13_1000988029_006849" bus1="1000988029.1.4" phases=1 conn=Wye model=1 kv=0.220000000 kw=2.0 pf=1 status=variable vmaxpu=1.5 vminpu=0.92 ! tipo=TW classe_ucbt=RE ctmt=IJAU13 ramal=988029 pac=1000988029
New "Load.TW_BT_971761_1_M1_IJAU13_1000971761_005258" bus1="1000971761.1.2.4" phases=1 conn=Delta model=1 kv=0.240000000 kw=2.0 pf=1 status=variable vmaxpu=1.5 vminpu=0.92 ! tipo=TW classe_ucbt=RE ctmt=IJAU13 ramal=971761 pac=1000971761
New "Load.TW_BT_1004759_2_M1_IJAU13_1001004759_000818" bus1="1001004759.2.4" phases=1 conn=Wye model=1 kv=0.120000000 kw=2.0 pf=1 status=variable vmaxpu=1.5 vminpu=0.92 ! tipo=TW classe_ucbt=RE ctmt=IJAU13 ramal=1004759 pac=1001004759
