New "Load.LDV_BT_1009358_M1_IJAU13_1001009358_001841" bus1="1001009358.1.2.4" phases=1 conn=Delta model=1 kv=0.220000000 kw=3.5 pf=1 status=variable vmaxpu=1.5 vminpu=0.92 ! tipo=LDV classe_ucbt=RE ctmt=IJAU13 ramal=1009358 pac=1001009358
New "Load.LDV_BT_1003247_1_M1_IJAU13_1001003247_000571" bus1="1001003247.2.3.4" phases=1 conn=Delta model=1 kv=0.220000000 kw=3.5 pf=1 status=variable vmaxpu=1.5 vminpu=0.92 ! tipo=LDV classe_ucbt=RE ctmt=IJAU13 ramal=1003247 pac=1001003247
New "Load.LDV_BT_992453_16_M2_IJAU13_1000992453_007279" bus1="1000992453.1.2.3.4" phases=3 conn=Delta model=1 kv=0.220000000 kw=3.5 pf=1 status=variable vmaxpu=1.5 vminpu=0.92 ! tipo=LDV classe_ucbt=RE ctmt=IJAU13 ramal=992453 pac=1000992453
New "Load.LDV_BT_999285_M1_IJAU13_1000999285_007730" bus1="1000999285.1.2.3.4" phases=3 conn=Delta model=1 kv=0.220000000 kw=3.5 pf=1 status=variable vmaxpu=1.5 vminpu=0.92 ! tipo=LDV classe_ucbt=RE ctmt=IJAU13 ramal=999285 pac=1000999285
New "Load.LDV_BT_977116_1_M1_IJAU13_1000977116_006002" bus1="1000977116.1.4" phases=1 conn=Wye model=1 kv=0.220000000 kw=3.5 pf=1 status=variable vmaxpu=1.5 vminpu=0.92 ! tipo=LDV classe_ucbt=RE ctmt=IJAU13 ramal=977116 pac=1000977116
New "Load.LDV_BT_972622_1_M2_IJAU13_1000972622_005412" bus1="1000972622.3.1.4" phases=1 conn=Delta model=1 kv=0.220000000 kw=3.5 pf=1 status=variable vmaxpu=1.5 vminpu=0.92 ! tipo=LDV classe_ucbt=RE ctmt=IJAU13 ramal=972622 pac=1000972622
New "Load.TW_BT_998774_M1_IJAU13_1000998774_007623" bus1="1000998774.2.4" phases=1 conn=Wye model=1 kv=0.220000000 kw=2.0 pf=1 status=variable vmaxpu=1.5 vminpu=0.92 ! tipo=TW classe_ucbt=RE ctmt=IJAU13 ramal=998774 pac=1000998774
New "Load.TW_BT_1008182_1_M1_IJAU13_1001008182_001592" bus1="1001008182.1.2.3.4" phases=3 conn=Delta model=1 kv=0.220000000 kw=2.0 pf=1 status=variable vmaxpu=1.5 vminpu=0.92 ! tipo=TW classe_ucbt=RE ctmt=IJAU13 ramal=1008182 pac=1001008182
