New "Load.LDV_BT_3822511_M1_IJAU15_1003822511_005133" bus1="1003822511.1.2.3.4" phases=3 conn=Delta model=1 kv=0.220000000 kw=3.5 pf=1 status=variable vmaxpu=1.5 vminpu=0.92 ! tipo=LDV classe_ucbt=RE ctmt=IJAU15 ramal=3822511 pac=1003822511
New "Load.LDV_BT_4521377_1_M1_IJAU15_1004521377_005958" bus1="1004521377.1.2.4" phases=1 conn=Delta model=1 kv=0.240000000 kw=3.5 pf=1 status=variable vmaxpu=1.5 vminpu=0.92 ! tipo=LDV classe_ucbt=RE ctmt=IJAU15 ramal=4521377 pac=1004521377
New "Load.LDV_BT_997255_M1_IJAU15_1000997255_008806" bus1="1000997255.2.4" phases=1 conn=Wye model=1 kv=0.220000000 kw=3.5 pf=1 status=variable vmaxpu=1.5 vminpu=0.92 ! tipo=LDV classe_ucbt=RE ctmt=IJAU15 ramal=997255 pac=1000997255
New "Load.LDV_BT_1242990_2_M2_IJAU15_1001242990_004696" bus1="1001242990.1.2.4" phases=1 conn=Delta model=1 kv=0.220000000 kw=3.5 pf=1 status=variable vmaxpu=1.5 vminpu=0.92 ! tipo=LDV classe_ucbt=RE ctmt=IJAU15 ramal=1242990 pac=1001242990
New "Load.LDV_BT_982422_M1_IJAU15_1000982422_008027" bus1="1000982422.3.4" phases=1 conn=Wye model=1 kv=0.220000000 kw=3.5 pf=1 status=variable vmaxpu=1.5 vminpu=0.92 ! tipo=LDV classe_ucbt=RE ctmt=IJAU15 ramal=982422 pac=1000982422
New "Load.TW_BT_985012_M1_IJAU15_1000985012_008278" bus1="1000985012.1.2.4" phases=1 conn=Delta model=1 kv=0.240000000 kw=2.0 pf=1 status=variable vmaxpu=1.5 vminpu=0.92 ! tipo=TW classe_ucbt=RE ctmt=IJAU15 ramal=985012 pac=1000985012
