New "Load.LDV_BT_3897880_2_M1_IJAU15_1003897880_005371" bus1="1003897880.1.2.4" phases=1 conn=Delta model=1 kv=0.240000000 kw=3.5 pf=1 status=variable vmaxpu=1.5 vminpu=0.92 ! tipo=LDV classe_ucbt=RE ctmt=IJAU15 ramal=3897880 pac=1003897880
New "Load.LDV_BT_1224552_M1_IJAU15_1001224552_003906" bus1="1001224552.1.4" phases=1 conn=Wye model=1 kv=0.120000000 kw=3.5 pf=1 status=variable vmaxpu=1.5 vminpu=0.92 ! tipo=LDV classe_ucbt=RE ctmt=IJAU15 ramal=1224552 pac=1001224552
New "Load.LDV_BT_975674_2_M2_IJAU15_1000975674_007381" bus1="1000975674.3.1.4" phases=1 conn=Delta model=1 kv=0.220000000 kw=3.5 pf=1 status=variable vmaxpu=1.5 vminpu=0.92 ! tipo=LDV classe_ucbt=RE ctmt=IJAU15 ramal=975674 pac=1000975674
New "Load.LDV_BT_3781491_M1_IJAU15_1003781491_004932" bus1="1003781491.1.2.4" phases=1 conn=Delta model=1 kv=0.240000000 kw=3.5 pf=1 status=variable vmaxpu=1.5 vminpu=0.92 ! tipo=LDV classe_ucbt=RE ctmt=IJAU15 ramal=3781491 pac=1003781491
New "Load.TW_BT_5023683_M1_IJAU15_1005023683_006345" bus1="1005023683.1.4" phases=1 conn=Wye model=1 kv=0.120000000 kw=2.0 pf=1 status=variable vmaxpu=1.5 vminpu=0.92 ! tipo=TW classe_ucbt=RE ctmt=IJAU15 ramal=5023683 pac=1005023683
New "Load.TW_BT_1004346_2_M2_IJAU15_1001004346_000163" bus1="1001004346.1.4" phases=1 conn=Wye model=1 kv=0.220000000 kw=2.0 pf=1 status=variable vmaxpu=1.5 vminpu=0.92 ! tipo=TW classe_ucbt=RE ctmt=IJAU15 ramal=1004346 pac=1001004346
