! ========================================
! ALIMENTADOR IJAU05
! ========================================
New "Load.LDV_S10003_BT_1024415_M1_IJAU05_1001024415_000461" bus1="1001024415.1.4" phases=1 conn=Wye model=1 kv=0.220000000 kw=3.5 pf=1 status=variable vmaxpu=1.5 vminpu=0.92 enabled=yes ! tipo=LDV kw_ativo=3.5 classe_ucbt=RE ctmt=IJAU05 ramal=1024415 pac=1001024415
New "Load.LDV_S10003_BT_1025983_M1_IJAU05_1001025983_000659" bus1="1001025983.1.4" phases=1 conn=Wye model=1 kv=0.220000000 kw=3.5 pf=1 status=variable vmaxpu=1.5 vminpu=0.92 enabled=yes ! tipo=LDV kw_ativo=3.5 classe_ucbt=RE ctmt=IJAU05 ramal=1025983 pac=1001025983
New "Load.LDV_S10003_BT_1034117_2_M1_IJAU05_1001034117_001704" bus1="1001034117.1.2.3.4" phases=3 conn=Delta model=1 kv=0.220000000 kw=3.5 pf=1 status=variable vmaxpu=1.5 vminpu=0.92 enabled=yes ! tipo=LDV kw_ativo=3.5 classe_ucbt=RE ctmt=IJAU05 ramal=1034117 pac=1001034117
New "Load.LDV_S10003_BT_5024698_M1_IJAU05_1005024698_005268" bus1="1005024698.2.3.4" phases=1 conn=Delta model=1 kv=0.220000000 kw=3.5 pf=1 status=variable vmaxpu=1.5 vminpu=0.92 enabled=yes ! tipo=LDV kw_ativo=3.5 classe_ucbt=RE ctmt=IJAU05 ramal=5024698 pac=1005024698
New "Load.TW_S10003_BT_6300046_M1_IJAU05_1006300046_005536" bus1="1006300046.1.4" phases=1 conn=Wye model=1 kv=0.220000000 kw=2.0 pf=1 status=variable vmaxpu=1.5 vminpu=0.92 enabled=yes ! tipo=TW kw_ativo=2.0 classe_ucbt=RE ctmt=IJAU05 ramal=6300046 pac=1006300046
New "Load.TW_S10003_BT_1035755_1_M2_IJAU05_1001035755_001930" bus1="1001035755.1.2.4" phases=1 conn=Delta model=1 kv=0.220000000 kw=2.0 pf=1 status=variable vmaxpu=1.5 vminpu=0.92 enabled=yes ! tipo=TW kw_ativo=2.0 classe_ucbt=RE ctmt=IJAU05 ramal=1035755 pac=1001035755

! ========================================
! ALIMENTADOR IJAU06
! ========================================
New "Load.LDV_S10003_BT_4311202_M1_IJAU06_1004311202_002206" bus1="1004311202.2.4" phases=1 conn=Wye model=1 kv=0.220000000 kw=3.5 pf=1 status=variable vmaxpu=1.5 vminpu=0.92 enabled=yes ! tipo=LDV kw_ativo=3.5 classe_ucbt=RE ctmt=IJAU06 ramal=4311202 pac=1004311202
New "Load.LDV_S10003_BT_1076992_M1_IJAU06_1001076992_001288" bus1="1001076992.3.1.4" phases=1 conn=Delta model=1 kv=0.220000000 kw=3.5 pf=1 status=variable vmaxpu=1.5 vminpu=0.92 enabled=yes ! tipo=LDV kw_ativo=3.5 classe_ucbt=RE ctmt=IJAU06 ramal=1076992 pac=1001076992
New "Load.LDV_S10003_BT_1223159_1_M2_IJAU06_1001223159_001831" bus1="1001223159.1.2.3.4" phases=3 conn=Delta model=1 kv=0.220000000 kw=3.5 pf=1 status=variable vmaxpu=1.5 vminpu=0.92 enabled=yes ! tipo=LDV kw_ativo=3.5 classe_ucbt=RE ctmt=IJAU06 ramal=1223159 pac=1001223159
New "Load.LDV_S10003_BT_1073520_M1_IJAU06_1001073520_000959" bus1="1001073520.2.4" phases=1 conn=Wye model=1 kv=0.220000000 kw=3.5 pf=1 status=variable vmaxpu=1.5 vminpu=0.92 enabled=yes ! tipo=LDV kw_ativo=3.5 classe_ucbt=RE ctmt=IJAU06 ramal=1073520 pac=1001073520
New "Load.TW_S10003_BT_1070664_2_M2_IJAU06_1001070664_000856" bus1="1001070664.1.2.3.4" phases=3 conn=Delta model=1 kv=0.220000000 kw=2.0 pf=1 status=variable vmaxpu=1.5 vminpu=0.92 enabled=yes ! tipo=TW kw_ativo=2.0 classe_ucbt=RE ctmt=IJAU06 ramal=1070664 pac=1001070664
New "Load.TW_S10003_BT_1078294_M1_IJAU06_1001078294_001447" bus1="1001078294.2.4" phases=1 conn=Wye model=1 kv=0.220000000 kw=2.0 pf=1 status=variable vmaxpu=1.5 vminpu=0.92 enabled=yes ! tipo=TW kw_ativo=2.0 classe_ucbt=RE ctmt=IJAU06 ramal=1078294 pac=1001078294

! ========================================
! ALIMENTADOR IJAU07
! ========================================
New "Load.LDV_S10003_BT_4382560_7_M2_IJAU07_1004382560_007025" bus1="1004382560.1.2.3.4" phases=3 conn=Delta model=1 kv=0.220000000 kw=3.5 pf=1 status=variable vmaxpu=1.5 vminpu=0.92 enabled=yes ! tipo=LDV kw_ativo=3.5 classe_ucbt=RE ctmt=IJAU07 ramal=4382560 pac=1004382560
New "Load.LDV_S10003_BT_1077846_M1_IJAU07_1001077846_004032" bus1="1001077846.1.2.3.4" phases=3 conn=Delta model=1 kv=0.220000000 kw=3.5 pf=1 status=variable vmaxpu=1.5 vminpu=0.92 enabled=yes ! tipo=LDV kw_ativo=3.5 classe_ucbt=RE ctmt=IJAU07 ramal=1077846 pac=1001077846
New "Load.LDV_S10003_BT_1063272_M1_IJAU07_1001063272_002908" bus1="1001063272.1.4" phases=1 conn=Wye model=1 kv=0.220000000 kw=3.5 pf=1 status=variable vmaxpu=1.5 vminpu=0.92 enabled=yes ! tipo=LDV kw_ativo=3.5 classe_ucbt=RE ctmt=IJAU07 ramal=1063272 pac=1001063272
New "Load.LDV_S10003_BT_1048152_2_M2_IJAU07_1001048152_000730" bus1="1001048152.1.2.3.4" phases=3 conn=Delta model=1 kv=0.220000000 kw=3.5 pf=1 status=variable vmaxpu=1.5 vminpu=0.92 enabled=yes ! tipo=LDV kw_ativo=3.5 classe_ucbt=RE ctmt=IJAU07 ramal=1048152 pac=1001048152
New "Load.LDV_S10003_BT_1085070_M1_IJAU07_1001085070_005037" bus1="1001085070.2.4" phases=1 conn=Wye model=1 kv=0.220000000 kw=3.5 pf=1 status=variable vmaxpu=1.5 vminpu=0.92 enabled=yes ! tipo=LDV kw_ativo=3.5 classe_ucbt=RE ctmt=IJAU07 ramal=1085070 pac=1001085070
New "Load.LDV_S10003_BT_1057329_M1_IJAU07_1001057329_002128" bus1="1001057329.1.2.3.4" phases=3 conn=Delta model=1 kv=0.220000000 kw=3.5 pf=1 status=variable vmaxpu=1.5 vminpu=0.92 enabled=yes ! tipo=LDV kw_ativo=3.5 classe_ucbt=RE ctmt=IJAU07 ramal=1057329 pac=1001057329
New "Load.TW_S10003_BT_3865176_M1_IJAU07_1003865176_006496" bus1="1003865176.2.4" phases=1 conn=Wye model=1 kv=0.120000000 kw=2.0 pf=1 status=variable vmaxpu=1.5 vminpu=0.92 enabled=yes ! tipo=TW kw_ativo=2.0 classe_ucbt=RE ctmt=IJAU07 ramal=3865176 pac=1003865176
New "Load.TW_S10003_BT_1041747_1_M2_IJAU07_1001041747_000478" bus1="1001041747.1.2.3.4" phases=3 conn=Delta model=1 kv=0.220000000 kw=2.0 pf=1 status=variable vmaxpu=1.5 vminpu=0.92 enabled=yes ! tipo=TW kw_ativo=2.0 classe_ucbt=RE ctmt=IJAU07 ramal=1041747 pac=1001041747
New "Load.TW_S10003_BT_1060836_M1_IJAU07_1001060836_002482" bus1="1001060836.3.1.4" phases=1 conn=Delta model=1 kv=0.220000000 kw=2.0 pf=1 status=variable vmaxpu=1.5 vminpu=0.92 enabled=yes ! tipo=TW kw_ativo=2.0 classe_ucbt=RE ctmt=IJAU07 ramal=1060836 pac=1001060836

! ========================================
! ALIMENTADOR IJAU10
! ========================================
New "Load.LDV_S10003_BT_1065652_1_M2_IJAU10_1001065652_003395" bus1="1001065652.1.2.3.4" phases=3 conn=Delta model=1 kv=0.220000000 kw=3.5 pf=1 status=variable vmaxpu=1.5 vminpu=0.92 enabled=yes ! tipo=LDV kw_ativo=3.5 classe_ucbt=RE ctmt=IJAU10 ramal=1065652 pac=1001065652
New "Load.TW_S10003_BT_4889353_9_M2_IJAU10_1004889353_004868" bus1="1004889353.1.2.3.4" phases=3 conn=Delta model=1 kv=0.220000000 kw=2.0 pf=1 status=variable vmaxpu=1.5 vminpu=0.92 enabled=yes ! tipo=TW kw_ativo=2.0 classe_ucbt=RE ctmt=IJAU10 ramal=4889353 pac=1004889353

! ========================================
! ALIMENTADOR IJAU11
! ========================================
New "Load.LDV_S10003_BT_1017660_1_M1_IJAU11_1001017660_001573" bus1="1001017660.1.2.3.4" phases=3 conn=Delta model=1 kv=0.220000000 kw=3.5 pf=1 status=variable vmaxpu=1.5 vminpu=0.92 enabled=yes ! tipo=LDV kw_ativo=3.5 classe_ucbt=RE ctmt=IJAU11 ramal=1017660 pac=1001017660
New "Load.LDV_S10003_BT_1018269_M1_IJAU11_1001018269_001715" bus1="1001018269.2.4" phases=1 conn=Wye model=1 kv=0.220000000 kw=3.5 pf=1 status=variable vmaxpu=1.5 vminpu=0.92 enabled=yes ! tipo=LDV kw_ativo=3.5 classe_ucbt=RE ctmt=IJAU11 ramal=1018269 pac=1001018269
New "Load.LDV_S10003_BT_1012431_1_M2_IJAU11_1001012431_000709" bus1="1001012431.1.2.4" phases=1 conn=Delta model=1 kv=0.220000000 kw=3.5 pf=1 status=variable vmaxpu=1.5 vminpu=0.92 enabled=yes ! tipo=LDV kw_ativo=3.5 classe_ucbt=RE ctmt=IJAU11 ramal=1012431 pac=1001012431
New "Load.LDV_S10003_BT_1020733_3_M1_IJAU11_1001020733_002032" bus1="1001020733.1.2.3.4" phases=3 conn=Delta model=1 kv=0.220000000 kw=3.5 pf=1 status=variable vmaxpu=1.5 vminpu=0.92 enabled=yes ! tipo=LDV kw_ativo=3.5 classe_ucbt=RE ctmt=IJAU11 ramal=1020733 pac=1001020733
New "Load.LDV_S10003_BT_992817_M1_IJAU11_1000992817_005266" bus1="1000992817.2.4" phases=1 conn=Wye model=1 kv=0.220000000 kw=3.5 pf=1 status=variable vmaxpu=1.5 vminpu=0.92 enabled=yes ! tipo=LDV kw_ativo=3.5 classe_ucbt=RE ctmt=IJAU11 ramal=992817 pac=1000992817
New "Load.LDV_S10003_BT_1037904_M1_IJAU11_1001037904_002947" bus1="1001037904.1.2.3.4" phases=3 conn=Delta model=1 kv=0.220000000 kw=3.5 pf=1 status=variable vmaxpu=1.5 vminpu=0.92 enabled=yes ! tipo=LDV kw_ativo=3.5 classe_ucbt=RE ctmt=IJAU11 ramal=1037904 pac=1001037904
New "Load.TW_S10003_BT_1018962_1_M1_IJAU11_1001018962_001826" bus1="1001018962.3.4" phases=1 conn=Wye model=1 kv=0.220000000 kw=2.0 pf=1 status=variable vmaxpu=1.5 vminpu=0.92 enabled=yes ! tipo=TW kw_ativo=2.0 classe_ucbt=RE ctmt=IJAU11 ramal=1018962 pac=1001018962

! ========================================
! ALIMENTADOR IJAU13
! ========================================
New "Load.LDV_S10003_BT_976276_1_M2_IJAU13_1000976276_005931" bus1="1000976276.1.4" phases=1 conn=Wye model=1 kv=0.120000000 kw=3.5 pf=1 status=variable vmaxpu=1.5 vminpu=0.92 enabled=yes ! tipo=LDV kw_ativo=3.5 classe_ucbt=RE ctmt=IJAU13 ramal=976276 pac=1000976276
New "Load.LDV_S10003_BT_976157_M1_IJAU13_1000976157_005908" bus1="1000976157.1.4" phases=1 conn=Wye model=1 kv=0.120000000 kw=3.5 pf=1 status=variable vmaxpu=1.5 vminpu=0.92 enabled=yes ! tipo=LDV kw_ativo=3.5 classe_ucbt=RE ctmt=IJAU13 ramal=976157 pac=1000976157
New "Load.LDV_S10003_BT_4434486_M1_IJAU13_1004434486_004306" bus1="1004434486.1.4" phases=1 conn=Wye model=1 kv=0.120000000 kw=3.5 pf=1 status=variable vmaxpu=1.5 vminpu=0.92 enabled=yes ! tipo=LDV kw_ativo=3.5 classe_ucbt=RE ctmt=IJAU13 ramal=4434486 pac=1004434486
New "Load.LDV_S10003_BT_999082_M1_IJAU13_1000999082_007696" bus1="1000999082.2.3.4" phases=1 conn=Delta model=1 kv=0.220000000 kw=3.5 pf=1 status=variable vmaxpu=1.5 vminpu=0.92 enabled=yes ! tipo=LDV kw_ativo=3.5 classe_ucbt=RE ctmt=IJAU13 ramal=999082 pac=1000999082
New "Load.LDV_S10003_BT_5000177_M2_IJAU13_1005000177_004595" bus1="1005000177.1.4" phases=1 conn=Wye model=1 kv=0.220000000 kw=3.5 pf=1 status=variable vmaxpu=1.5 vminpu=0.92 enabled=yes ! tipo=LDV kw_ativo=3.5 classe_ucbt=RE ctmt=IJAU13 ramal=5000177 pac=1005000177
New "Load.LDV_S10003_BT_990283_M1_IJAU13_1000990283_007060" bus1="1000990283.1.2.4" phases=1 conn=Delta model=1 kv=0.220000000 kw=3.5 pf=1 status=variable vmaxpu=1.5 vminpu=0.92 enabled=yes ! tipo=LDV kw_ativo=3.5 classe_ucbt=RE ctmt=IJAU13 ramal=990283 pac=1000990283
New "Load.TW_S10003_BT_978978_M1_IJAU13_1000978978_006264" bus1="1000978978.2.4" phases=1 conn=Wye model=1 kv=0.120000000 kw=2.0 pf=1 status=variable vmaxpu=1.5 vminpu=0.92 enabled=yes ! tipo=TW kw_ativo=2.0 classe_ucbt=RE ctmt=IJAU13 ramal=978978 pac=1000978978
New "Load.TW_S10003_BT_4261236_2_M2_IJAU13_1004261236_004161" bus1="1004261236.1.4" phases=1 conn=Wye model=1 kv=0.220000000 kw=2.0 pf=1 status=variable vmaxpu=1.5 vminpu=0.92 enabled=yes ! tipo=TW kw_ativo=2.0 classe_ucbt=RE ctmt=IJAU13 ramal=4261236 pac=1004261236
New "Load.TW_S10003_BT_999726_M1_IJAU13_1000999726_007842" bus1="1000999726.3.4" phases=1 conn=Wye model=1 kv=0.220000000 kw=2.0 pf=1 status=variable vmaxpu=1.5 vminpu=0.92 enabled=yes ! tipo=TW kw_ativo=2.0 classe_ucbt=RE ctmt=IJAU13 ramal=999726 pac=1000999726
New "Load.TW_S10003_BT_971250_1_M2_IJAU13_1000971250_005147" bus1="1000971250.3.1.4" phases=1 conn=Delta model=1 kv=0.220000000 kw=2.0 pf=1 status=variable vmaxpu=1.5 vminpu=0.92 enabled=yes ! tipo=TW kw_ativo=2.0 classe_ucbt=RE ctmt=IJAU13 ramal=971250 pac=1000971250
New "Load.TW_S10003_BT_1012186_1_M1_IJAU13_1001012186_002057" bus1="1001012186.1.4" phases=1 conn=Wye model=1 kv=0.120000000 kw=2.0 pf=1 status=variable vmaxpu=1.5 vminpu=0.92 enabled=yes ! tipo=TW kw_ativo=2.0 classe_ucbt=RE ctmt=IJAU13 ramal=1012186 pac=1001012186

! ========================================
! ALIMENTADOR IJAU14
! ========================================
New "Load.LDV_S10003_BT_966595_2_M1_IJAU14_1000966595_002380" bus1="1000966595.1.2.4" phases=1 conn=Delta model=1 kv=0.220000000 kw=3.5 pf=1 status=variable vmaxpu=1.5 vminpu=0.92 enabled=yes ! tipo=LDV kw_ativo=3.5 classe_ucbt=RE ctmt=IJAU14 ramal=966595 pac=1000966595
New "Load.LDV_S10003_BT_988519_2_M2_IJAU14_1000988519_002922" bus1="1000988519.1.4" phases=1 conn=Wye model=1 kv=0.220000000 kw=3.5 pf=1 status=variable vmaxpu=1.5 vminpu=0.92 enabled=yes ! tipo=LDV kw_ativo=3.5 classe_ucbt=RE ctmt=IJAU14 ramal=988519 pac=1000988519

! ========================================
! ALIMENTADOR IJAU15
! ========================================
New "Load.LDV_S10003_BT_1234268_M1_IJAU15_1001234268_004440" bus1="1001234268.1.4" phases=1 conn=Wye model=1 kv=0.220000000 kw=3.5 pf=1 status=variable vmaxpu=1.5 vminpu=0.92 enabled=yes ! tipo=LDV kw_ativo=3.5 classe_ucbt=RE ctmt=IJAU15 ramal=1234268 pac=1001234268
New "Load.TW_S10003_BT_968758_M2_IJAU15_1000968758_006865" bus1="1000968758.2.4" phases=1 conn=Wye model=1 kv=0.220000000 kw=2.0 pf=1 status=variable vmaxpu=1.5 vminpu=0.92 enabled=yes ! tipo=TW kw_ativo=2.0 classe_ucbt=RE ctmt=IJAU15 ramal=968758 pac=1000968758
