! ========================================
! ALIMENTADOR IJAU05
! ========================================
New "Load.LDV_S10005_BT_1072610_1_M2_IJAU05_1001072610_003155" bus1="1001072610.3.4" phases=1 conn=Wye model=1 kv=0.220000000 kw=3.5 pf=1 status=variable vmaxpu=1.5 vminpu=0.92 enabled=yes ! tipo=LDV kw_ativo=3.5 classe_ucbt=RE ctmt=IJAU05 ramal=1072610 pac=1001072610
New "Load.LDV_S10005_BT_4202576_1_M2_IJAU05_1004202576_004713" bus1="1004202576.1.2.3.4" phases=3 conn=Delta model=1 kv=0.220000000 kw=3.5 pf=1 status=variable vmaxpu=1.5 vminpu=0.92 enabled=yes ! tipo=LDV kw_ativo=3.5 classe_ucbt=RE ctmt=IJAU05 ramal=4202576 pac=1004202576
New "Load.LDV_S10005_BT_4139758_M1_IJAU05_1004139758_004667" bus1="1004139758.1.2.3.4" phases=3 conn=Delta model=1 kv=0.220000000 kw=3.5 pf=1 status=variable vmaxpu=1.5 vminpu=0.92 enabled=yes ! tipo=LDV kw_ativo=3.5 classe_ucbt=RE ctmt=IJAU05 ramal=4139758 pac=1004139758

! ========================================
! ALIMENTADOR IJAU06
! ========================================
New "Load.LDV_S10005_BT_1196734_M1_IJAU06_1001196734_001737" bus1="1001196734.1.2.4" phases=1 conn=Delta model=1 kv=0.220000000 kw=3.5 pf=1 status=variable vmaxpu=1.5 vminpu=0.92 enabled=yes ! tipo=LDV kw_ativo=3.5 classe_ucbt=RE ctmt=IJAU06 ramal=1196734 pac=1001196734
New "Load.LDV_S10005_BT_1249479_4_M2_IJAU06_1001249479_001912" bus1="1001249479.1.2.3.4" phases=3 conn=Delta model=1 kv=0.220000000 kw=3.5 pf=1 status=variable vmaxpu=1.5 vminpu=0.92 enabled=yes ! tipo=LDV kw_ativo=3.5 classe_ucbt=RE ctmt=IJAU06 ramal=1249479 pac=1001249479
New "Load.LDV_S10005_BT_1076061_M1_IJAU06_1001076061_001161" bus1="1001076061.2.3.4" phases=1 conn=Delta model=1 kv=0.220000000 kw=3.5 pf=1 status=variable vmaxpu=1.5 vminpu=0.92 enabled=yes ! tipo=LDV kw_ativo=3.5 classe_ucbt=RE ctmt=IJAU06 ramal=1076061 pac=1001076061
New "Load.LDV_S10005_BT_1065449_M1_IJAU06_1001065449_000527" bus1="1001065449.2.4" phases=1 conn=Wye model=1 kv=0.220000000 kw=3.5 pf=1 status=variable vmaxpu=1.5 vminpu=0.92 enabled=yes ! tipo=LDV kw_ativo=3.5 classe_ucbt=RE ctmt=IJAU06 ramal=1065449 pac=1001065449
New "Load.LDV_S10005_BT_1197315_1_M1_IJAU06_1001197315_001766" bus1="1001197315.1.2.3.4" phases=3 conn=Delta model=1 kv=0.220000000 kw=3.5 pf=1 status=variable vmaxpu=1.5 vminpu=0.92 enabled=yes ! tipo=LDV kw_ativo=3.5 classe_ucbt=RE ctmt=IJAU06 ramal=1197315 pac=1001197315

! ========================================
! ALIMENTADOR IJAU07
! ========================================
New "Load.LDV_S10005_BT_1060696_1_M1_IJAU07_1001060696_002454" bus1="1001060696.3.1.4" phases=1 conn=Delta model=1 kv=0.220000000 kw=3.5 pf=1 status=variable vmaxpu=1.5 vminpu=0.92 enabled=yes ! tipo=LDV kw_ativo=3.5 classe_ucbt=RE ctmt=IJAU07 ramal=1060696 pac=1001060696
New "Load.LDV_S10005_BT_1057238_1_M2_IJAU07_1001057238_002108" bus1="1001057238.2.3.4" phases=1 conn=Delta model=1 kv=0.220000000 kw=3.5 pf=1 status=variable vmaxpu=1.5 vminpu=0.92 enabled=yes ! tipo=LDV kw_ativo=3.5 classe_ucbt=RE ctmt=IJAU07 ramal=1057238 pac=1001057238
New "Load.LDV_S10005_BT_3891216_4_M1_IJAU07_1003891216_006579" bus1="1003891216.1.2.3.4" phases=3 conn=Delta model=1 kv=0.220000000 kw=3.5 pf=1 status=variable vmaxpu=1.5 vminpu=0.92 enabled=yes ! tipo=LDV kw_ativo=3.5 classe_ucbt=RE ctmt=IJAU07 ramal=3891216 pac=1003891216
New "Load.LDV_S10005_BT_1052268_1_M1_IJAU07_1001052268_001349" bus1="1001052268.1.4" phases=1 conn=Wye model=1 kv=0.220000000 kw=3.5 pf=1 status=variable vmaxpu=1.5 vminpu=0.92 enabled=yes ! tipo=LDV kw_ativo=3.5 classe_ucbt=RE ctmt=IJAU07 ramal=1052268 pac=1001052268
New "Load.LDV_S10005_BT_1053325_1_M2_IJAU07_1001053325_001641" bus1="1001053325.1.2.4" phases=1 conn=Delta model=1 kv=0.220000000 kw=3.5 pf=1 status=variable vmaxpu=1.5 vminpu=0.92 enabled=yes ! tipo=LDV kw_ativo=3.5 classe_ucbt=RE ctmt=IJAU07 ramal=1053325 pac=1001053325
New "Load.TW_S10005_BT_4423545_1_M2_IJAU07_1004423545_007059" bus1="1004423545.1.2.3.4" phases=3 conn=Delta model=1 kv=0.220000000 kw=2.0 pf=1 status=variable vmaxpu=1.5 vminpu=0.92 enabled=yes ! tipo=TW kw_ativo=2.0 classe_ucbt=RE ctmt=IJAU07 ramal=4423545 pac=1004423545
New "Load.TW_S10005_BT_4286520_M1_IJAU07_1004286520_006913" bus1="1004286520.1.4" phases=1 conn=Wye model=1 kv=0.120000000 kw=2.0 pf=1 status=variable vmaxpu=1.5 vminpu=0.92 enabled=yes ! tipo=TW kw_ativo=2.0 classe_ucbt=RE ctmt=IJAU07 ramal=4286520 pac=1004286520
New "Load.TW_S10005_BT_1054529_2_M2_IJAU07_1001054529_001836" bus1="1001054529.1.2.3.4" phases=3 conn=Delta model=1 kv=0.220000000 kw=2.0 pf=1 status=variable vmaxpu=1.5 vminpu=0.92 enabled=yes ! tipo=TW kw_ativo=2.0 classe_ucbt=RE ctmt=IJAU07 ramal=1054529 pac=1001054529
New "Load.TW_S10005_BT_4423545_7_M2_IJAU07_1004423545_007071" bus1="1004423545.1.2.3.4" phases=3 conn=Delta model=1 kv=0.220000000 kw=2.0 pf=1 status=variable vmaxpu=1.5 vminpu=0.92 enabled=yes ! tipo=TW kw_ativo=2.0 classe_ucbt=RE ctmt=IJAU07 ramal=4423545 pac=1004423545
New "Load.TW_S10005_BT_1053339_1_M1_IJAU07_1001053339_001643" bus1="1001053339.3.4" phases=1 conn=Wye model=1 kv=0.220000000 kw=2.0 pf=1 status=variable vmaxpu=1.5 vminpu=0.92 enabled=yes ! tipo=TW kw_ativo=2.0 classe_ucbt=RE ctmt=IJAU07 ramal=1053339 pac=1001053339

! ========================================
! ALIMENTADOR IJAU10
! ========================================
New "Load.LDV_S10005_BT_4403189_20_M2_IJAU10_1004403189_004691" bus1="1004403189.1.2.3.4" phases=3 conn=Delta model=1 kv=0.220000000 kw=3.5 pf=1 status=variable vmaxpu=1.5 vminpu=0.92 enabled=yes ! tipo=LDV kw_ativo=3.5 classe_ucbt=RE ctmt=IJAU10 ramal=4403189 pac=1004403189
New "Load.LDV_S10005_BT_3673488_1_M2_IJAU10_1003673488_004299" bus1="1003673488.1.2.3.4" phases=3 conn=Delta model=1 kv=0.220000000 kw=3.5 pf=1 status=variable vmaxpu=1.5 vminpu=0.92 enabled=yes ! tipo=LDV kw_ativo=3.5 classe_ucbt=RE ctmt=IJAU10 ramal=3673488 pac=1003673488
New "Load.TW_S10005_BT_1037764_17_M1_IJAU10_1001037764_001090" bus1="1001037764.1.2.3.4" phases=3 conn=Delta model=1 kv=0.220000000 kw=2.0 pf=1 status=variable vmaxpu=1.5 vminpu=0.92 enabled=yes ! tipo=TW kw_ativo=2.0 classe_ucbt=RE ctmt=IJAU10 ramal=1037764 pac=1001037764
New "Load.TW_S10005_BT_4251828_2_M1_IJAU10_1004251828_004599" bus1="1004251828.1.4" phases=1 conn=Wye model=1 kv=0.220000000 kw=2.0 pf=1 status=variable vmaxpu=1.5 vminpu=0.92 enabled=yes ! tipo=TW kw_ativo=2.0 classe_ucbt=RE ctmt=IJAU10 ramal=4251828 pac=1004251828

! ========================================
! ALIMENTADOR IJAU11
! ========================================
New "Load.LDV_S10005_BT_1037302_M1_IJAU11_1001037302_002919" bus1="1001037302.3.4" phases=1 conn=Wye model=1 kv=0.220000000 kw=3.5 pf=1 status=variable vmaxpu=1.5 vminpu=0.92 enabled=yes ! tipo=LDV kw_ativo=3.5 classe_ucbt=RE ctmt=IJAU11 ramal=1037302 pac=1001037302
New "Load.LDV_S10005_BT_1024058_1_M2_IJAU11_1001024058_002417" bus1="1001024058.1.2.3.4" phases=3 conn=Delta model=1 kv=0.220000000 kw=3.5 pf=1 status=variable vmaxpu=1.5 vminpu=0.92 enabled=yes ! tipo=LDV kw_ativo=3.5 classe_ucbt=RE ctmt=IJAU11 ramal=1024058 pac=1001024058
New "Load.TW_S10005_BT_1012802_1_M1_IJAU11_1001012802_000780" bus1="1001012802.2.4" phases=1 conn=Wye model=1 kv=0.220000000 kw=2.0 pf=1 status=variable vmaxpu=1.5 vminpu=0.92 enabled=yes ! tipo=TW kw_ativo=2.0 classe_ucbt=RE ctmt=IJAU11 ramal=1012802 pac=1001012802
New "Load.TW_S10005_BT_990913_M1_IJAU11_1000990913_005097" bus1="1000990913.3.4" phases=1 conn=Wye model=1 kv=0.220000000 kw=2.0 pf=1 status=variable vmaxpu=1.5 vminpu=0.92 enabled=yes ! tipo=TW kw_ativo=2.0 classe_ucbt=RE ctmt=IJAU11 ramal=990913 pac=1000990913

! ========================================
! ALIMENTADOR IJAU13
! ========================================
New "Load.LDV_S10005_BT_1009358_M1_IJAU13_1001009358_001841" bus1="1001009358.1.2.4" phases=1 conn=Delta model=1 kv=0.220000000 kw=3.5 pf=1 status=variable vmaxpu=1.5 vminpu=0.92 enabled=yes ! tipo=LDV kw_ativo=3.5 classe_ucbt=RE ctmt=IJAU13 ramal=1009358 pac=1001009358
New "Load.LDV_S10005_BT_1003247_1_M1_IJAU13_1001003247_000571" bus1="1001003247.2.3.4" phases=1 conn=Delta model=1 kv=0.220000000 kw=3.5 pf=1 status=variable vmaxpu=1.5 vminpu=0.92 enabled=yes ! tipo=LDV kw_ativo=3.5 classe_ucbt=RE ctmt=IJAU13 ramal=1003247 pac=1001003247
New "Load.LDV_S10005_BT_992453_16_M2_IJAU13_1000992453_007279" bus1="1000992453.1.2.3.4" phases=3 conn=Delta model=1 kv=0.220000000 kw=3.5 pf=1 status=variable vmaxpu=1.5 vminpu=0.92 enabled=yes ! tipo=LDV kw_ativo=3.5 classe_ucbt=RE ctmt=IJAU13 ramal=992453 pac=1000992453
New "Load.LDV_S10005_BT_999285_M1_IJAU13_1000999285_007730" bus1="1000999285.1.2.3.4" phases=3 conn=Delta model=1 kv=0.220000000 kw=3.5 pf=1 status=variable vmaxpu=1.5 vminpu=0.92 enabled=yes ! tipo=LDV kw_ativo=3.5 classe_ucbt=RE ctmt=IJAU13 ramal=999285 pac=1000999285
New "Load.LDV_S10005_BT_977116_1_M1_IJAU13_1000977116_006002" bus1="1000977116.1.4" phases=1 conn=Wye model=1 kv=0.220000000 kw=3.5 pf=1 status=variable vmaxpu=1.5 vminpu=0.92 enabled=yes ! tipo=LDV kw_ativo=3.5 classe_ucbt=RE ctmt=IJAU13 ramal=977116 pac=1000977116
New "Load.LDV_S10005_BT_972622_1_M2_IJAU13_1000972622_005412" bus1="1000972622.3.1.4" phases=1 conn=Delta model=1 kv=0.220000000 kw=3.5 pf=1 status=variable vmaxpu=1.5 vminpu=0.92 enabled=yes ! tipo=LDV kw_ativo=3.5 classe_ucbt=RE ctmt=IJAU13 ramal=972622 pac=1000972622
New "Load.TW_S10005_BT_998774_M1_IJAU13_1000998774_007623" bus1="1000998774.2.4" phases=1 conn=Wye model=1 kv=0.220000000 kw=2.0 pf=1 status=variable vmaxpu=1.5 vminpu=0.92 enabled=yes ! tipo=TW kw_ativo=2.0 classe_ucbt=RE ctmt=IJAU13 ramal=998774 pac=1000998774
New "Load.TW_S10005_BT_1008182_1_M1_IJAU13_1001008182_001592" bus1="1001008182.1.2.3.4" phases=3 conn=Delta model=1 kv=0.220000000 kw=2.0 pf=1 status=variable vmaxpu=1.5 vminpu=0.92 enabled=yes ! tipo=TW kw_ativo=2.0 classe_ucbt=RE ctmt=IJAU13 ramal=1008182 pac=1001008182

! ========================================
! ALIMENTADOR IJAU14
! ========================================
New "Load.LDV_S10005_BT_1244012_2_M2_IJAU14_1001244012_000553" bus1="1001244012.3.4" phases=1 conn=Wye model=1 kv=0.220000000 kw=3.5 pf=1 status=variable vmaxpu=1.5 vminpu=0.92 enabled=yes ! tipo=LDV kw_ativo=3.5 classe_ucbt=RE ctmt=IJAU14 ramal=1244012 pac=1001244012
New "Load.LDV_S10005_BT_963788_M1_IJAU14_1000963788_001865" bus1="1000963788.3.4" phases=1 conn=Wye model=1 kv=0.220000000 kw=3.5 pf=1 status=variable vmaxpu=1.5 vminpu=0.92 enabled=yes ! tipo=LDV kw_ativo=3.5 classe_ucbt=RE ctmt=IJAU14 ramal=963788 pac=1000963788
New "Load.LDV_S10005_BT_984207_M1_IJAU14_1000984207_002659" bus1="1000984207.3.4" phases=1 conn=Wye model=1 kv=0.220000000 kw=3.5 pf=1 status=variable vmaxpu=1.5 vminpu=0.92 enabled=yes ! tipo=LDV kw_ativo=3.5 classe_ucbt=RE ctmt=IJAU14 ramal=984207 pac=1000984207
New "Load.TW_S10005_BT_6477167_1_M2_IJAU14_1006477167_001608" bus1="1006477167.1.2.3.4" phases=3 conn=Delta model=1 kv=0.220000000 kw=2.0 pf=1 status=variable vmaxpu=1.5 vminpu=0.92 enabled=yes ! tipo=TW kw_ativo=2.0 classe_ucbt=RE ctmt=IJAU14 ramal=6477167 pac=1006477167
New "Load.TW_S10005_BT_1227212_M1_IJAU14_1001227212_000492" bus1="1001227212.2.4" phases=1 conn=Wye model=1 kv=0.220000000 kw=2.0 pf=1 status=variable vmaxpu=1.5 vminpu=0.92 enabled=yes ! tipo=TW kw_ativo=2.0 classe_ucbt=RE ctmt=IJAU14 ramal=1227212 pac=1001227212

! ========================================
! ALIMENTADOR IJAU15
! ========================================
New "Load.LDV_S10005_BT_3897880_2_M1_IJAU15_1003897880_005371" bus1="1003897880.1.2.4" phases=1 conn=Delta model=1 kv=0.240000000 kw=3.5 pf=1 status=variable vmaxpu=1.5 vminpu=0.92 enabled=yes ! tipo=LDV kw_ativo=3.5 classe_ucbt=RE ctmt=IJAU15 ramal=3897880 pac=1003897880
New "Load.LDV_S10005_BT_1224552_M1_IJAU15_1001224552_003906" bus1="1001224552.1.4" phases=1 conn=Wye model=1 kv=0.120000000 kw=3.5 pf=1 status=variable vmaxpu=1.5 vminpu=0.92 enabled=yes ! tipo=LDV kw_ativo=3.5 classe_ucbt=RE ctmt=IJAU15 ramal=1224552 pac=1001224552
New "Load.LDV_S10005_BT_975674_2_M2_IJAU15_1000975674_007381" bus1="1000975674.3.1.4" phases=1 conn=Delta model=1 kv=0.220000000 kw=3.5 pf=1 status=variable vmaxpu=1.5 vminpu=0.92 enabled=yes ! tipo=LDV kw_ativo=3.5 classe_ucbt=RE ctmt=IJAU15 ramal=975674 pac=1000975674
New "Load.LDV_S10005_BT_3781491_M1_IJAU15_1003781491_004932" bus1="1003781491.1.2.4" phases=1 conn=Delta model=1 kv=0.240000000 kw=3.5 pf=1 status=variable vmaxpu=1.5 vminpu=0.92 enabled=yes ! tipo=LDV kw_ativo=3.5 classe_ucbt=RE ctmt=IJAU15 ramal=3781491 pac=1003781491
New "Load.TW_S10005_BT_5023683_M1_IJAU15_1005023683_006345" bus1="1005023683.1.4" phases=1 conn=Wye model=1 kv=0.120000000 kw=2.0 pf=1 status=variable vmaxpu=1.5 vminpu=0.92 enabled=yes ! tipo=TW kw_ativo=2.0 classe_ucbt=RE ctmt=IJAU15 ramal=5023683 pac=1005023683
New "Load.TW_S10005_BT_1004346_2_M2_IJAU15_1001004346_000163" bus1="1001004346.1.4" phases=1 conn=Wye model=1 kv=0.220000000 kw=2.0 pf=1 status=variable vmaxpu=1.5 vminpu=0.92 enabled=yes ! tipo=TW kw_ativo=2.0 classe_ucbt=RE ctmt=IJAU15 ramal=1004346 pac=1001004346
